// SBML level 3 version 1

model Mg_model()

  // Compartments:
  compartment comp1 = 1;

  // Species:
  species $Mg_e in comp1 = 0.8;
  species Mg_f in comp1 = 0.8/comp1;
  species TRPM in comp1 = 1/comp1;
  species ATP in comp1 = 24.348/comp1;
  species Mg_ATP in comp1 = 9.01348/comp1;
  species $Mg in comp1;
  species Mg_IM in comp1 = 2.810066/comp1;
  species TRPM_n in comp1 = 1/comp1;
  species $cons in comp1 = 0;
  species $ATP_prod in comp1 = 1;
  species $TRPM_prod in comp1 = 1;
  species $nMg in comp1;
  species $nMg_f in comp1;
  species $IM in comp1 = 88.6098;
  species M7CK in comp1 = 1/comp1;
  species M7CK_n in comp1 = 1/comp1;
  species $deg in comp1 = 0;
  species $H3S10 in comp1 = 1;
  species pH3S10 in comp1 = 1/comp1;
  species $nMg_IM in comp1;
  species $nMg_ATP in comp1;
  species $h3s10_prod in comp1 = 1;

  // Parameters:
  Mg_0 = Mg_f + Mg_ATP + Mg_IM;
  Mg_f_0 = Mg_f;
  Mg_IM_0 = Mg_IM;
  Mg_ATP_0 = Mg_ATP;
  pH3S10_0 = pH3S10;
  TRPM_0 = TRPM;
  TRPM_n_0 = TRPM_n;
  M7CK_n_0 = M7CK_n;
  kd_mg_i = 0.2408361;
  n_mg_i = 1;
  k_m_i = 0.9771044;
  k_m_e = 0.6730172;
  k_atp_p0 = 9.814581;
  k_atp_pm = 1.13;
  k_atp_c = 0.6221636;
  k_matp_b = 0.5055075;
  n_matp_b = 0.1060703;
  k_matp_ub = 0.9464132;
  k_mim_b = 0.450179;
  n_mim_b = 9.970539;
  k_mim_ub = 0.4795583;
  k_ntrpm_p = 0.6664977;
  n_ntrpm_p = 1;
  k_ntrpm_t = 0.7599027;
  n_ntrpm_t = 1;
  k_trpm_s = 0.7578005;
  k_m7ck_t1 = 0.5638119;
  n_m7ck_t = 1;
  k_m7ck_t2 = 0.4542293;
  k_m7ck_deg = 0.8500625;
  k_h3s10_p = 7.035444;
  k_h3s10_d = 0.7221698;
  k_h3s10_a = 0.9589421;
  n_h3s10_a = 1;
  k_h3s10_da = 0.807474;
  IM_prod = 1;

  // Assignment rules:
  Mg := Mg_f + Mg_ATP + Mg_IM;
  nMg := Mg/Mg_0;
  nMg_f := Mg_f/Mg_f_0;
  nMg_IM := Mg_IM/Mg_IM_0;
  nMg_ATP := Mg_ATP/Mg_ATP_0;
  npH3S10 := pH3S10/pH3S10_0;
  nTRPM := TRPM/TRPM_0;
  nTRPM_n := TRPM_n/TRPM_n_0;
  nM7CK_n := M7CK_n/M7CK_n_0;
  F_trpm_i := 1;
  F_mg_i := ((Mg_0 + kd_mg_i)/(Mg + kd_mg_i))^n_mg_i;

  // Reactions:
  v1: $Mg_e + TRPM => Mg_f + TRPM; k_m_i*Mg_e*(Mg_e > 0)*F_mg_i*F_trpm_i - k_m_e*Mg_f*(Mg_f > 0);
  v2: $ATP_prod + Mg_f => ATP + Mg_f; k_atp_p0 + k_atp_pm*Mg_f;
  v3: ATP => $cons; k_atp_c*ATP;
  v4: Mg_f + ATP -> Mg_ATP; k_matp_b*Mg_f^n_matp_b*(Mg_f > 0)*ATP*(ATP > 0) - k_matp_ub*Mg_ATP*(Mg_ATP > 0);
  v5: Mg_f + $IM -> Mg_IM; k_mim_b*Mg_f^n_mim_b*(Mg_f > 0)*IM*(IM > 0) - k_mim_ub*Mg_IM*(Mg_IM > 0);
  v6: $TRPM_prod + Mg_ATP => TRPM_n + Mg_ATP; k_ntrpm_p*TRPM_prod*Mg_ATP^n_ntrpm_p;
  v7: TRPM_n => TRPM; k_ntrpm_t*TRPM_n^n_ntrpm_t;
  v8: TRPM => M7CK; k_trpm_s*TRPM;
  v9: M7CK -> M7CK_n; k_m7ck_t1*M7CK^n_m7ck_t*(M7CK > 0) - k_m7ck_t2*M7CK_n*(M7CK_n > 0);
  v10: M7CK => $deg; k_m7ck_deg*M7CK*(M7CK > 0);
  v11: $h3s10_prod -> $H3S10; k_h3s10_p;
  v12: $H3S10 -> $deg; k_h3s10_d*H3S10;
  v13: $H3S10 + M7CK_n -> pH3S10 + M7CK_n; k_h3s10_a*H3S10*M7CK_n^n_h3s10_a*(H3S10 > 0) - k_h3s10_da*pH3S10*(pH3S10 > 0);

  // Events:
  _E0: at (time > 0): Mg_f_0 = Mg_f;
  _E1: at (time > 0): pH3S10_0 = pH3S10;
  _E2: at (time > 0): Mg_0 = Mg_f + Mg_ATP + Mg_IM;
  _E3: at (time > 0): Mg_f_0 = Mg_f;
  _E4: at (time > 0): Mg_IM_0 = Mg_IM;
  _E5: at (time > 0): TRPM_0 = TRPM;
  _E6: at (time > 0): Mg_ATP_0 = Mg_ATP;
  _E7: at (time > 0): TRPM_n_0 = TRPM_n;
  _E8: at (time > 0): M7CK_n_0 = M7CK_n;
end
