// SBML level 2 version 4

model model_Mg()
  // model_Mg

  // Compartments:
  compartment Compartment_1 = 1;

  // Species:
  species $Mg_e in Compartment_1 = 0.5;
  species Mg_f in Compartment_1 = 0.5;
  species TRPM in Compartment_1 = 10;
  species $ATP in Compartment_1 = 30;
  species Mg_ATP in Compartment_1 = 9;
  species Mg in Compartment_1;
  species TRPM_n in Compartment_1 = 10;
  species $cons in Compartment_1 = 0;
  species $ATP_prod in Compartment_1 = 1;
  species $TRPM_prod in Compartment_1 = 1;
  species Mg_0 in Compartment_1 = Mg_f + Mg_ATP + Mg_IM;
  species Mg_n in Compartment_1;
  species Mg_f_n in Compartment_1;
  species Mg_f_0 in Compartment_1 = Mg_f;
  species Mg_IM in Compartment_1 = 9;
  species $IM in Compartment_1 = 30;

  // Parameters:
  k_m_i = 0.001610389;
  k_m_e = 0.01033296;
  k_atp_p0 = 0.5053925;
  k_matp_ub = 0.007217405;
  k_matp_b = 0.6577572;
  k_atp_c = 0.0503283;
  k_atp_pm = 0.322766;
  n_atpm_b = 1;
  k_mim_b = 0.663086;
  k_mim_ub = 0.8330784;
  var F_trpm_i;
  n_matp_b = 8.312582;
  var F_mg_i;

  // Assignment rules:
  Mg := Mg_f + Mg_ATP + Mg_IM;
  Mg_n := Mg/Mg_0;
  Mg_f_n := Mg_f/Mg_f_0;
  F_trpm_i := TRPM;
  F_mg_i := Mg_0/Mg;

  // Reactions:
  Mg_transport: $Mg_e + TRPM => Mg_f + TRPM; k_m_i*Mg_e*(Mg_e > 0)*F_trpm_i*F_mg_i - k_m_e*Mg_f*(Mg_f > 0);
  Mg_ATP_binding: Mg_f + $ATP => Mg_ATP; k_matp_b*Mg_f^n_matp_b*(Mg_f > 0)*ATP^n_atpm_b*(ATP > 0) - k_matp_ub*Mg_ATP*(Mg_ATP > 0); Mg_ATP_binding is "Mg/ATP binding";
  Membrane_binding: Mg_f + $IM -> Mg_IM; k_mim_b*Mg_f*(Mg_f > 0)*IM*(IM > 0) - k_mim_ub*Mg_IM*(Mg_IM > 0);
end
