// SBML level 3 version 1

model combined()

  // Compartments:
  compartment default_compartment = 1;
  compartment M1_comp1 = 1;
  compartment PP_PP_comp1 = 1;

  // Species:
  species $Mg_e in M1_comp1 = 0.5;
  species Mg_f in M1_comp1 = 0.5;
  species M1_TRPM in M1_comp1 = 1;
  species M1_ATP in M1_comp1 = 16;
  species M1_Mg_ATP in M1_comp1 = 9;
  species $M1_Mg in M1_comp1;
  species M1_Mg_IM in M1_comp1 = 9;
  species M1_nTRPM in M1_comp1 = 1;
  species $M1_cons in M1_comp1 = 0;
  species $M1_ATP_prod in M1_comp1 = 1;
  species $M1_TRPM_prod in M1_comp1 = 1;
  species M1_Mg_0 in M1_comp1 = Mg_f + M1_Mg_ATP + M1_Mg_IM;
  species $M1_Mg_n in M1_comp1;
  species $M1_Mg_f_n in M1_comp1;
  species Mg_f_0 in M1_comp1 = Mg_f;
  species $M1_IM in M1_comp1 = 88.6098;
  species M1_M7CK in M1_comp1 = 1;
  species M1_nM7CK in M1_comp1 = 1;
  species $M1_deg in M1_comp1 = 0;
  species $M1_H3S10 in M1_comp1 = 1;
  species M1_pH3S10 in M1_comp1 = 1;
  species $M1_Mg_IM_n in M1_comp1;
  species $M1_Mg_ATP_n in M1_comp1;
  species M1_Mg_f_1 in M1_comp1 = 0.5;
  species M1_pH3S10_0 in M1_comp1 = M1_pH3S10;
  species PP_PP_deg in PP_PP_comp1 = 0;
  species PP_PP_V165a in PP_PP_comp1 = 1200;
  species PP_PP_IFNG in PP_PP_comp1 = 468;
  species PP_PP_IFNGR_JAK in PP_PP_comp1 = 17784; PP_PP_IFNGR_JAK is "IFNGR/JAK";
  species PP_PP_IFNG_R_JAK in PP_PP_comp1 = 0; PP_PP_IFNG_R_JAK is "IFNG/R/JAK";
  species PP_PP_pIFNG_R_JAK in PP_PP_comp1 = 0; PP_PP_pIFNG_R_JAK is "pIFNG/R/JAK";
  species PP_PP_STAT1 in PP_PP_comp1 = 552129;
  species PP_PP_pIFNG_R_JAK_STAT1 in PP_PP_comp1 = 78; PP_PP_pIFNG_R_JAK_STAT1 is "pIFNG/R/JAK/STAT1";
  species PP_PP_pSTAT1 in PP_PP_comp1 = 28;
  species PP_PP_pSTAT1D in PP_PP_comp1 = 36;
  species PP_PP_pSTAT1D_n in PP_PP_comp1 = 58;
  species PP_PP_STAT1D_n in PP_PP_comp1 = 36;
  species PP_PP_STAT1_n in PP_PP_comp1 = 1557;
  species $PP_PP_SOCS1_prod in PP_PP_comp1 = 1;
  species PP_PP_SOCS1 in PP_PP_comp1 = 5425;
  species PP_PP_IFNG_R_JAK_SOCS1 in PP_PP_comp1 = 10; PP_PP_IFNG_R_JAK_SOCS1 is "IFNG/R/JAK/SOCS1";
  species PP_PP_IFNG_R_lyso in PP_PP_comp1 = 1; PP_PP_IFNG_R_lyso is "IFNG/R_lyso";
  species PP_PP_SOCS1_JAK in PP_PP_comp1 = 4; PP_PP_SOCS1_JAK is "SOCS1/JAK";
  species PP_PP_IRF9 in PP_PP_comp1 = 1589;
  species PP_PP_IRF9_n in PP_PP_comp1 = 15960;
  species PP_PP_pSTAT1D_IRF9 in PP_PP_comp1 = 7; PP_PP_pSTAT1D_IRF9 is "pSTAT1D/IRF9";
  species PP_PP_pSTAT1D_IRF9_n in PP_PP_comp1 = 87; PP_PP_pSTAT1D_IRF9_n is "pSTAT1D/IRF9_n";
  species $PP_PP_CXCL10_prod in PP_PP_comp1 = 1;
  species PP_PP_SOCS3 in PP_PP_comp1 = 2830;
  species PP_PP_IFNG_R_JAK_SOCS3 in PP_PP_comp1 = 3; PP_PP_IFNG_R_JAK_SOCS3 is "IFNG/R/JAK/SOCS3";
  species PP_PP_SOCS3_JAK in PP_PP_comp1 = 8; PP_PP_SOCS3_JAK is "SOCS3/JAK";
  species $PP_PP_SOCS3_prod in PP_PP_comp1 = 1;
  species PP_PP_IL4 in PP_PP_comp1 = 26;
  species PP_PP_IL4R_JAK in PP_PP_comp1 = 3068; PP_PP_IL4R_JAK is "IL4R/JAK";
  species PP_PP_IL4_R_JAK in PP_PP_comp1 = 0; PP_PP_IL4_R_JAK is "IL4/R/JAK";
  species PP_PP_pIL4_R_JAK in PP_PP_comp1 = 0; PP_PP_pIL4_R_JAK is "pIL4/R/JAK";
  species PP_PP_STAT6 in PP_PP_comp1 = 59952;
  species PP_PP_pIL4_R_JAK_STAT6 in PP_PP_comp1 = 0; PP_PP_pIL4_R_JAK_STAT6 is "pIL4/R/JAK/STAT6";
  species PP_PP_pSTAT6 in PP_PP_comp1 = 14;
  species PP_PP_pSTAT6D in PP_PP_comp1 = 0;
  species PP_PP_pSTAT6D_n in PP_PP_comp1 = 12;
  species PP_PP_STAT6D_n in PP_PP_comp1 = 0;
  species PP_PP_STAT6_n in PP_PP_comp1 = 5;
  species PP_PP_IL4_R_JAK_SOCS1_i in PP_PP_comp1 = 0; PP_PP_IL4_R_JAK_SOCS1_i is "IL4/R/JAK/SOCS1_i";
  species PP_PP_IL4_R_lyso in PP_PP_comp1 = 0; PP_PP_IL4_R_lyso is "IL4/R_lyso";
  species PP_PP_IL4_R_JAK_SOCS3_i in PP_PP_comp1 = 0; PP_PP_IL4_R_JAK_SOCS3_i is "IL4/R/JAK/SOCS3_i";
  species PP_PP_PTEN in PP_PP_comp1 = 75355;
  species PP_PP_IRF4 in PP_PP_comp1 = 18703;
  species $PP_PP_IRF4_prod in PP_PP_comp1 = 1;
  species PP_PP_IL10 in PP_PP_comp1 = 900;
  species PP_PP_JAK in PP_PP_comp1 = 99122;
  species IFNGR in PP_PP_comp1 = 93;
  species PP_PP_IFNG_R in PP_PP_comp1 = 1; PP_PP_IFNG_R is "IFNG/R";
  species IL4R in PP_PP_comp1 = 16;
  species PP_PP_IL4_R in PP_PP_comp1 = 0; PP_PP_IL4_R is "IL4/R";
  species $PP_PP_IL10_prod in PP_PP_comp1 = 1;
  species $PP_PP_ARG1_prod in PP_PP_comp1 = 1;
  species PP_PP_ARG1 in PP_PP_comp1 = 1450000;
  species $PP_PP_IL12_prod in PP_PP_comp1 = 1;
  species $PP_PP_CXCL9_prod in PP_PP_comp1 = 1;
  species $PP_PP_miR3473_prod in PP_PP_comp1 = 1;
  species PP_PP_m3473b in PP_PP_comp1 = 477;
  species PP_PP_mPTEN in PP_PP_comp1 = 10;
  species PP_PP_m3473b_mPTEN in PP_PP_comp1 = 3; PP_PP_m3473b_mPTEN is "m3473b/mPTEN";
  species $PP_PP_IRF1_prod in PP_PP_comp1 = 1;
  species $PP_PP_iNOS_prod in PP_PP_comp1 = 1;
  species PP_PP_iNOS in PP_PP_comp1 = 880;
  species PP_PP_m93 in PP_PP_comp1 = 1437;
  species PP_PP_HIF1a in PP_PP_comp1 = 1192;
  species PP_PP_HIF2a in PP_PP_comp1 = 752;
  species $PP_PP_HIF1a_prod in PP_PP_comp1 = 1;
  species $PP_PP_HIF2a_prod in PP_PP_comp1 = 1;
  species $PP_PP_PPARG_prod in PP_PP_comp1 = 1;
  species PP_PP_PPARG in PP_PP_comp1 = 1227;
  species PP_PP_aPPARG in PP_PP_comp1 = 873;
  species PP_PP_HIF1b_n in PP_PP_comp1 = 14868;
  species PP_PP_HIF2a_n in PP_PP_comp1 = 209;
  species PP_PP_HIF1a_n in PP_PP_comp1 = 331;
  species PP_PP_HIF2a_b_n in PP_PP_comp1 = 52; PP_PP_HIF2a_b_n is "HIF2a/b_n";
  species PP_PP_HIF1a_b_n in PP_PP_comp1 = 82; PP_PP_HIF1a_b_n is "HIF1a/b_n";
  species PP_PP_IRF1 in PP_PP_comp1 = 997;
  species PP_PP_PHD in PP_PP_comp1 = 12376;
  species $PP_PP_O2 in PP_PP_comp1 = 120400000;
  species PP_PP_O2_aPHD in PP_PP_comp1 = 1405; PP_PP_O2_aPHD is "O2/aPHD";
  species PP_PP_HIF1a_OH in PP_PP_comp1 = 35;
  species PP_PP_HIF2a_OH in PP_PP_comp1 = 8;
  species PP_PP_TNFa in PP_PP_comp1 = 384;
  species PP_PP_CXCL9 in PP_PP_comp1 = 30;
  species PP_PP_mIRF9 in PP_PP_comp1 = 5;
  species PP_PP_m93_mIRF9 in PP_PP_comp1 = 5; PP_PP_m93_mIRF9 is "m93/mIRF9";
  species $PP_PP_IRF9_prod in PP_PP_comp1 = 1;
  species $PP_PP_PTEN_prod in PP_PP_comp1 = 1;
  species $PP_PP_VEGF_prod in PP_PP_comp1 = 1;
  species $PP_PP_IFNG_prod in PP_PP_comp1 = 1;
  species PP_PP_IL12 in PP_PP_comp1 = 151;
  species $PP_PP_PHD_prod in PP_PP_comp1 = 1;
  species $PP_PP_miR93_prod in PP_PP_comp1 = 1;
  species $PP_PP_IFNGR_prod in PP_PP_comp1 = 1;
  species $PP_PP_jak_prod in PP_PP_comp1 = 1;
  species PP_PP_aPHD in PP_PP_comp1 = 17680;
  species PP_PP_mCXCL10 in PP_PP_comp1 = 2;
  species PP_PP_pIL4_R_JAK_i in PP_PP_comp1 = 0; PP_PP_pIL4_R_JAK_i is "pIL4/R/JAK_i";
  species $PP_PP_IL4_prod in PP_PP_comp1 = 1;
  species PP_PP_IL4_R_JAK_SOCS1 in PP_PP_comp1 = 2; PP_PP_IL4_R_JAK_SOCS1 is "IL4/R/JAK/SOCS1";
  species PP_PP_IL4_R_JAK_SOCS3 in PP_PP_comp1 = 0; PP_PP_IL4_R_JAK_SOCS3 is "IL4/R/JAK/SOCS3";
  species $PP_PP_TNFa_prod in PP_PP_comp1 = 1;
  species $PP_PP_il4r_prod in PP_PP_comp1 = 1;
  species $PP_PP_IRG1_prod in PP_PP_comp1 = 1;
  species PP_PP_IRG1 in PP_PP_comp1 = 2450;
  species PP_PP_Itaconate in PP_PP_comp1 = 65000000;
  species $PP_PP_Itaconate_prod in PP_PP_comp1 = 1;
  species $PP_PP_IRF9T in PP_PP_comp1;
  species PP_PP_STAT3 in PP_PP_comp1 = 249039;
  species PP_PP_pSTAT3 in PP_PP_comp1 = 6;
  species PP_PP_pSTAT3D in PP_PP_comp1 = 2;
  species PP_PP_pSTAT3D_n in PP_PP_comp1 = 5;
  species PP_PP_STAT3D_n in PP_PP_comp1 = 2;
  species PP_PP_STAT3_n in PP_PP_comp1 = 81;
  species PP_PP_pSTAT1_3 in PP_PP_comp1 = 78; PP_PP_pSTAT1_3 is "pSTAT1/3";
  species PP_PP_pSTAT1_3_n in PP_PP_comp1 = 775; PP_PP_pSTAT1_3_n is "pSTAT1/3_n";
  species PP_PP_PI3K in PP_PP_comp1 = 3828;
  species PP_PP_pPI3K in PP_PP_comp1 = 173;
  species PP_PP_AKT1 in PP_PP_comp1 = 131577;
  species PP_PP_AKT2 in PP_PP_comp1 = 43860;
  species PP_PP_pAKT1 in PP_PP_comp1 = 18424;
  species PP_PP_pAKT2 in PP_PP_comp1 = 6141;
  species $PP_PP_IL10R_prod in PP_PP_comp1 = 1;
  species PP_PP_IL10R in PP_PP_comp1 = 4;
  species PP_PP_IL10R_JAK in PP_PP_comp1 = 759; PP_PP_IL10R_JAK is "IL10R/JAK";
  species PP_PP_IL10_R_JAK in PP_PP_comp1 = 0; PP_PP_IL10_R_JAK is "IL10/R/JAK";
  species PP_PP_pIL10_R_JAK in PP_PP_comp1 = 0; PP_PP_pIL10_R_JAK is "pIL10/R/JAK";
  species PP_PP_pIL10_R_JAK_STAT3 in PP_PP_comp1 = 6; PP_PP_pIL10_R_JAK_STAT3 is "pIL10/R/JAK/STAT3";
  species PP_PP_IL10_R_lyso in PP_PP_comp1 = 0; PP_PP_IL10_R_lyso is "IL10/R_lyso";
  species PP_PP_IL10_R_JAK_SOCS1 in PP_PP_comp1 = 1; PP_PP_IL10_R_JAK_SOCS1 is "IL10/R/JAK/SOCS1";
  species PP_PP_IL10_R in PP_PP_comp1 = 4; PP_PP_IL10_R is "IL10/R";
  species $PP_PP_pAKT_t in PP_PP_comp1;
  species PP_PP_mIL10 in PP_PP_comp1 = 1;
  species $PP_PP_STAT1_prod in PP_PP_comp1 = 1;
  species $PP_PP_miR146b_prod in PP_PP_comp1 = 1;
  species PP_PP_m146b in PP_PP_comp1 = 131;
  species PP_PP_pre_m146b in PP_PP_comp1 = 66; PP_PP_pre_m146b is "pre-m146b";
  species $PP_PP_mir155_prod in PP_PP_comp1 = 1;
  species PP_PP_pre_m155 in PP_PP_comp1 = 845; PP_PP_pre_m155 is "pre-m155";
  species PP_PP_m155 in PP_PP_comp1 = 844;
  species $PP_PP_cebpb_prod in PP_PP_comp1 = 1;
  species PP_PP_CEBPB in PP_PP_comp1 = 98868;
  species PP_PP_TNFR in PP_PP_comp1 = 1405;
  species PP_PP_TNFa_R in PP_PP_comp1 = 8; PP_PP_TNFa_R is "TNFa/R";
  species PP_PP_TNFa_R_lyso in PP_PP_comp1 = 0; PP_PP_TNFa_R_lyso is "TNFa/R_lyso";
  species PP_PP_RIP1 in PP_PP_comp1 = 134379;
  species PP_PP_aRIP1 in PP_PP_comp1 = 886;
  species $PP_PP_rip_prod in PP_PP_comp1 = 1;
  species PP_PP_A20 in PP_PP_comp1 = 3000;
  species $PP_PP_tnfr_prod in PP_PP_comp1 = 1;
  species PP_PP_TAK1 in PP_PP_comp1 = 14869;
  species PP_PP_pTAK1 in PP_PP_comp1 = 132;
  species PP_PP_p38 in PP_PP_comp1 = 675778;
  species PP_PP_pp38 in PP_PP_comp1 = 10093;
  species PP_PP_pp38_n in PP_PP_comp1 = 14131;
  species PP_PP_JNK in PP_PP_comp1 = 14521;
  species PP_PP_pJNK in PP_PP_comp1 = 144;
  species PP_PP_IKK in PP_PP_comp1 = 100324;
  species PP_PP_pIKK in PP_PP_comp1 = 87;
  species $PP_PP_ikk_prod in PP_PP_comp1 = 1;
  species PP_PP_pJNK_n in PP_PP_comp1 = 337;
  species PP_PP_ERK in PP_PP_comp1 = 2000000;
  species PP_PP_pERK in PP_PP_comp1 = 706;
  species PP_PP_pERK_n in PP_PP_comp1 = 2470;
  species PP_PP_VEGFR1 in PP_PP_comp1 = 5200;
  species PP_PP_V165a_R1 in PP_PP_comp1 = 8; PP_PP_V165a_R1 is "V165a/R1";
  species PP_PP_pV165a_R1 in PP_PP_comp1 = 3; PP_PP_pV165a_R1 is "pV165a/R1";
  species PP_PP_V165_R1_lyso in PP_PP_comp1 = 18; PP_PP_V165_R1_lyso is "V165/R1_lyso";
  species PP_PP_V165b in PP_PP_comp1 = 400;
  species PP_PP_V165b_R1 in PP_PP_comp1 = 20; PP_PP_V165b_R1 is "V165b/R1";
  species PP_PP_pV165a_R1_STAT3 in PP_PP_comp1 = 11; PP_PP_pV165a_R1_STAT3 is "pV165a/R1/STAT3";
  species $PP_PP_R1_prod in PP_PP_comp1 = 1;
  species PP_PP_p65 in PP_PP_comp1 = 75892;
  species PP_PP_p50 in PP_PP_comp1 = 4;
  species $PP_PP_nfkb_prod in PP_PP_comp1 = 1;
  species NFKB in PP_PP_comp1 = 277;
  species PP_NFKB_n in PP_PP_comp1 = 931;
  species PP_PP_IKB_n in PP_PP_comp1 = 25;
  species PP_PP_IKB_NFKB_n in PP_PP_comp1 = 29; PP_PP_IKB_NFKB_n is "IKB/NFKB_n";
  species PP_PP_IKB_NFKB in PP_PP_comp1 = 68307; PP_PP_IKB_NFKB is "IKB/NFKB";
  species IKB in PP_PP_comp1 = 435;
  species $PP_Ikb_prod in PP_PP_comp1 = 1;
  species PP_PP_pIKB in PP_PP_comp1 = 143;
  species PP_PP_p50_n in PP_PP_comp1 = 50;
  species PP_PP_CREB in PP_PP_comp1 = 75239;
  species PP_PP_pCREB in PP_PP_comp1 = 4761;
  species $PP_PP_ap1_prod in PP_PP_comp1 = 1;
  species PP_PP_AP1_n in PP_PP_comp1 = 864;
  species PP_PP_INT1 in PP_PP_comp1 = 995;
  species PP_PP_aINT1 in PP_PP_comp1 = 5;
  species $PP_PP_egr2_prod in PP_PP_comp1 = 1;
  species PP_PP_EGR2 in PP_PP_comp1 = 7100;
  species $PP_PP_a20_prod in PP_PP_comp1 = 1;
  species PP_PP_INT2 in PP_PP_comp1 = 995;
  species PP_PP_aINT2 in PP_PP_comp1 = 5;
  species $PP_PP_il1b_prod in PP_PP_comp1 = 1;
  species PP_PP_IL1b in PP_PP_comp1 = 845;
  species $PP_PP_il1r_prod in PP_PP_comp1 = 1;
  species PP_PP_IL1R in PP_PP_comp1 = 625;
  species PP_PP_IL1b_R in PP_PP_comp1 = 1; PP_PP_IL1b_R is "IL1b/R";
  species PP_PP_IRAK4 in PP_PP_comp1 = 199999;
  species PP_PP_IL1b_R_lyso in PP_PP_comp1 = 0; PP_PP_IL1b_R_lyso is "IL1b/R_lyso";
  species $PP_PP_irak4_prod in PP_PP_comp1 = 1;
  species PP_PP_TRAF6 in PP_PP_comp1 = 2995;
  species PP_PP_IRF5 in PP_PP_comp1 = 146962;
  species PP_PP_aIRF5 in PP_PP_comp1 = 3120;
  species PP_PP_aTRAF6 in PP_PP_comp1 = 5;
  species PP_PP_IL1Ra in PP_PP_comp1 = 11000;
  species PP_PP_IL1Ra_R in PP_PP_comp1 = 16; PP_PP_IL1Ra_R is "IL1Ra/R";
  species $PP_PP_il1ra_prod in PP_PP_comp1 = 1;
  species PP_PP_pIRAK4 in PP_PP_comp1 = 1;
  species PP_PP_GSK3b in PP_PP_comp1 = 87270;
  species PP_PP_pGSK3b in PP_PP_comp1 = 52730;
  species PP_IL8_R in default_compartment = 1;
  species $PP_IL8R_prod in default_compartment = 0;
  species PP_IL8R in default_compartment = 1;
  species PP_deg in default_compartment = 0;
  species $PP_IL8 in default_compartment = 1;
  species $PP_IL8_prod in default_compartment = 1;
  species deg in default_compartment = 0;
  species $IL8_prod in default_compartment = 0;
  species IL8 in default_compartment = 0;

  // Parameters:
  M1_Mg_IM_0 = M1_Mg_IM;
  M1_Mg_ATP_0 = M1_Mg_ATP;
  M1_k_m_i = 0.2537765;
  M1_k_m_e = 0.254913;
  M1_k_matp_b = 0.5857682;
  M1_n_matp_b = 0.02110402;
  M1_k_matp_ub = 0.9462731;
  M1_k_atp_c = 0.6221636;
  M1_k_ntrpm_t = 0.96;
  M1_n_ntrpm_t = 0.516;
  M1_k_atp_p0 = 9.814581;
  M1_k_atp_pm = 2.332337;
  M1_k_ntrpm_p = 0.11;
  M1_n_ntrpm_p = 12.22;
  M1_k_mim_b = 0.9531612;
  M1_n_mim_b = 8.196932;
  M1_k_mim_ub = 0.03924968;
  M1_k_trpm_s = 0.955;
  M1_k_m7ck_t1 = 0.83;
  M1_n_m7ck_t = 1.9;
  M1_k_m7ck_t2 = 0.96;
  M1_k_m7ck_deg = 0.89;
  M1_k_h3s10_p = 0.0008;
  M1_n_h3s10_p = 0.8;
  M1_k_h3s10_up = 0.0007;
  M1_k_ntrpm_d = 0.1;
  PP_PP_k104 = 0.2086;
  PP_PP_k119 = 2.672;
  PP_PP_k33 = 0.007;
  PP_PP_k86 = 50;
  PP_PP_k87 = 0.0005;
  PP_PP_kf39 = 4e-6;
  PP_PP_kr40 = 0.002;
  PP_PP_kf22 = 2.6e-6;
  PP_PP_kr22 = 0.13;
  PP_PP_kf102 = 0.6;
  PP_PP_kr102 = 0.1;
  PP_PP_k23 = 0.2;
  PP_PP_k103 = 1;
  PP_PP_k34 = 0.3;
  PP_PP_k82 = 1;
  PP_PP_kf24 = 0.1;
  PP_PP_kr24 = 10;
  PP_PP_k25 = 8;
  PP_PP_kf11 = 0.008;
  PP_PP_kr11 = 0.2;
  PP_PP_k66 = 0.1;
  PP_PP_kf35 = 0.0004;
  PP_PP_k37 = 0.01;
  PP_PP_k111 = 0.1;
  PP_PP_kf27 = 0.002;
  PP_PP_kr5 = 1;
  PP_PP_k28 = 0.4;
  PP_PP_k26 = 0.01;
  PP_PP_k31 = 0.05;
  PP_PP_k73 = 14184;
  PP_PP_kb73 = 5;
  PP_PP_k80 = 1.22;
  PP_PP_k81 = 0.006;
  PP_PP_kr39 = 0.002;
  PP_PP_kf1 = 1.6e-7;
  PP_PP_kf2 = 3;
  PP_PP_kr2 = 10;
  PP_PP_kf3 = 0.03;
  PP_PP_kr3 = 3;
  PP_PP_k4 = 2;
  PP_PP_k12 = 0.1;
  PP_PP_k21 = 1;
  PP_PP_k13 = 0.03;
  PP_PP_kf18 = 0.004;
  PP_PP_kf5 = 0.1;
  PP_PP_k6 = 1;
  PP_PP_k7 = 0.03;
  PP_PP_k9 = 0.1;
  PP_PP_k54 = 192.86;
  PP_PP_ka54 = 13000;
  PP_PP_kb54 = 500;
  PP_PP_k55 = 0.0057644;
  PP_PP_kf58 = 0.005;
  PP_PP_kr58 = 0.018;
  PP_PP_kf60 = 5e-7;
  PP_PP_kr60 = 0.03;
  PP_PP_k74 = 606;
  PP_PP_ka74 = 32600;
  PP_PP_kb74 = 25400;
  PP_PP_k75 = 0.0008;
  PP_PP_kr94 = 0.1;
  PP_PP_kf94 = 0.07;
  PP_PP_kf62 = 7.14e-9;
  PP_PP_kr62 = 10.8;
  PP_PP_k63 = 1.33e-5;
  PP_PP_k76 = 0.03;
  PP_PP_k65 = 0.6;
  PP_PP_k64 = 5e-6;
  PP_PP_k52 = 204.54;
  PP_PP_ka52 = 100;
  PP_PP_k85 = 0.022;
  PP_PP_k48 = 14.8;
  PP_PP_ka48 = 40000;
  PP_PP_k92 = 0.0012;
  PP_PP_kf50 = 0.0001;
  PP_PP_kr50 = 0.06;
  PP_PP_k51 = 0.1;
  PP_PP_k71 = 0.32;
  PP_PP_k49 = 2.32;
  PP_PP_k93 = 0.0003;
  PP_PP_k88 = 0.003;
  PP_PP_k79 = 9.9636;
  PP_PP_ka79 = 0.05;
  PP_PP_k90 = 0.0018;
  PP_PP_k70 = 0.5;
  PP_PP_k67 = 1.18;
  PP_PP_k89 = 0.004;
  PP_PP_kf14 = 0.00013;
  PP_PP_kr14 = 1;
  PP_PP_k15 = 0.1;
  PP_PP_kr124 = 0.01;
  PP_PP_k117 = 0.4;
  PP_PP_k38 = 17100;
  PP_PP_ka38 = 30000;
  PP_PP_kb38 = 20000;
  PP_PP_k84 = 0.0002;
  PP_PP_k56 = 16.696;
  PP_PP_ka56 = 200;
  PP_PP_k57 = 1.45e-5;
  PP_PP_k106 = 0.5;
  PP_PP_k105 = 0.001;
  PP_PP_k120 = 6.4e-12;
  PP_PP_k121 = 0.00062;
  PP_PP_k122 = 0.05;
  PP_PP_k123 = 0.005;
  PP_PP_k72 = 856.3;
  PP_PP_ka72 = 6000;
  PP_PP_k53 = 27.467;
  PP_PP_ka53 = 4000;
  PP_PP_kb53 = 82234;
  PP_PP_k99 = 0.006;
  PP_PP_k45 = 487.82;
  PP_PP_ka45 = 10000;
  PP_PP_kc45 = 5;
  PP_PP_k98 = 0.0006;
  PP_PP_k118 = 0.0074611;
  PP_PP_ka118 = 2000000;
  PP_PP_k44 = 8.74e-8;
  PP_PP_k46 = 180.31;
  PP_PP_k97 = 0.00033;
  PP_PP_k47 = 1.67e-6;
  PP_PP_k96 = 0.0002;
  PP_PP_k17 = 7e-5;
  PP_PP_k95 = 0.0035;
  PP_PP_k101 = 0.004;
  PP_PP_k20 = 82138;
  PP_PP_ka20 = 6000;
  PP_PP_k100 = 0.05;
  PP_PP_k127 = 0.3;
  PP_PP_kf125 = 0.1;
  PP_PP_kr125 = 1;
  PP_PP_k126 = 1;
  PP_PP_k129 = 1;
  PP_PP_kf131 = 1;
  PP_PP_k133 = 0.1;
  PP_PP_k134 = 0.005;
  PP_PP_k135 = 5.1357;
  PP_PP_k136 = 0.088;
  PP_PP_k137 = 0.8;
  PP_PP_k138 = 0.00013;
  PP_PP_k140 = 0.01;
  PP_PP_ka138 = 5000;
  PP_PP_k142 = 0.04;
  PP_PP_k155 = 0.006;
  PP_PP_kf144 = 3e-7;
  PP_PP_kr144 = 0.015;
  PP_PP_kf145 = 4.0078;
  PP_PP_kr145 = 0.1;
  PP_PP_k148 = 0.1;
  PP_PP_k150 = 0.1;
  PP_PP_kf146 = 0.001;
  PP_PP_kr146 = 2;
  PP_PP_k147 = 7.5;
  PP_PP_kb44 = 20;
  PP_PP_k156 = 0.2;
  PP_PP_k157 = 0.002;
  PP_PP_k158 = 0.0004;
  PP_PP_k159 = 800;
  PP_PP_k161 = 0.0005;
  PP_PP_k160 = 0.13083;
  PP_PP_k163 = 0.001;
  PP_PP_k162 = 0.003;
  PP_PP_k166 = 0.001;
  PP_PP_k165 = 0.003;
  PP_PP_k167 = 0.001;
  PP_PP_k164 = 1.27e-13;
  PP_PP_ka164 = 20;
  PP_PP_k168 = 0.003;
  PP_PP_k169 = 7.13e-9;
  PP_PP_ka169 = 100;
  PP_PP_ka159 = 50;
  PP_PP_k176 = 200;
  PP_PP_k174 = 0.004;
  PP_PP_kf170 = 1.7e-6;
  PP_PP_kr170 = 0.021;
  PP_PP_k171 = 0.1;
  PP_PP_k173 = 1;
  PP_PP_k172 = 1;
  PP_PP_k175 = 0.001;
  PP_PP_k179 = 1;
  PP_PP_k180 = 6;
  PP_PP_k181 = 6.2e-6;
  PP_PP_k182 = 1;
  PP_PP_k184 = 0.2;
  PP_PP_k183 = 70;
  PP_PP_ka183 = 10000;
  PP_PP_k178 = 5.148;
  PP_PP_k177 = 0.0005;
  PP_PP_k185 = 0.7;
  PP_PP_k188 = 0.5;
  PP_PP_k186 = 1;
  PP_PP_ka186 = 200;
  PP_PP_k187 = 0.2;
  PP_PP_k190 = 1;
  PP_PP_k189 = 5e-8;
  PP_PP_k191 = 100;
  PP_PP_k192 = 5.2e-10;
  PP_PP_k193 = 0.3;
  PP_PP_k195 = 4.9739;
  PP_PP_k198 = 0.1;
  PP_PP_k197 = 0.2;
  PP_PP_ka195 = 1000000;
  PP_PP_kf199 = 1e-6;
  PP_PP_kr199 = 0.005;
  PP_PP_kf200 = 1;
  PP_PP_kr200 = 0.5;
  PP_PP_k201 = 2;
  PP_PP_k202 = 0.5;
  PP_PP_k203 = 1;
  PP_PP_k204 = 20;
  PP_PP_kf205 = 1e-5;
  PP_PP_kr205 = 0.05;
  PP_PP_k206 = 1;
  PP_PP_kf207 = 4e-5;
  PP_PP_kr207 = 2;
  PP_PP_k208 = 1;
  PP_PP_k209 = 9.35;
  PP_PP_k210 = 0.0001;
  PP_PP_k222 = 240;
  PP_PP_kf216 = 0.001;
  PP_PP_kr216 = 6e-5;
  PP_PP_k217 = 0.8;
  PP_PP_kf220 = 0.1;
  PP_PP_kr220 = 0.8;
  PP_PP_k219 = 0.1;
  PP_PP_k223 = 1;
  PP_k221 = 0.2;
  PP_PP_k224 = 0.010425;
  PP_PP_kf215 = 0.001;
  PP_PP_kr215 = 1;
  PP_PP_k211 = 40;
  PP_PP_k212 = 0.1;
  PP_PP_k213 = 0.00046;
  PP_PP_k214 = 0.00035;
  PP_PP_k225 = 0.1;
  PP_k226 = 0.1;
  PP_PP_ka222 = 10000000;
  PP_PP_k228 = 3.9e-7;
  PP_PP_k227 = 1e-7;
  PP_PP_k229 = 0.012;
  PP_PP_k230 = 0.048045;
  PP_PP_kb164 = 6000;
  PP_PP_kr1 = 0.01;
  PP_PP_k231 = 0.00038;
  PP_PP_k232 = 0.002;
  PP_PP_k234 = 0.0015;
  PP_PP_k233 = 292.31;
  PP_PP_ka233 = 300;
  PP_PP_kb169 = 2000;
  PP_PP_k236 = 0.00024;
  PP_PP_k235 = 0.01;
  PP_PP_k238 = 0.00075;
  PP_PP_k237 = 2.44e-8;
  PP_PP_ka178 = 100000;
  PP_PP_ka160 = 30;
  PP_PP_kf242 = 1.75e-7;
  PP_PP_kr242 = 0.1;
  PP_PP_k241 = 0.0008;
  PP_PP_k247 = 0.00035;
  PP_PP_k240 = 5.485;
  PP_PP_k239 = 5.2492;
  PP_PP_k243 = 0.02;
  PP_PP_k245 = 0.1;
  PP_PP_k244 = 1;
  PP_PP_k246 = 174;
  PP_PP_k255 = 1e-5;
  PP_PP_k256 = 1;
  PP_PP_k249 = 1;
  PP_PP_k248 = 3.18e-7;
  PP_PP_k252 = 0.0001;
  PP_PP_k251 = 30841;
  PP_PP_ka248 = 300;
  PP_PP_k254 = 0.0040925;
  PP_PP_k253 = 0.002;
  PP_PP_kb20 = 1000000;
  PP_PP_ka224 = 5000;
  PP_PP_kb248 = 100000;
  PP_PP_kc248 = 20;
  PP_PP_k258 = 0.1;
  PP_PP_k257 = 1.04e-10;
  PP_PP_ka230 = 5000;
  PP_PP_ka240 = 100;
  PP_PP_ka254 = 5000;
  PP_PP_ka239 = 500000000;
  PP_PP_ka246 = 1000;
  PP_PP_kb254 = 20000;
  PP_PP_kb118 = 5;
  PP_PP_ka44 = 50000;
  PP_PP_kc44 = 1000;
  PP_PP_kd44 = 31396;
  PP_PP_kb239 = 5;
  PP_PP_ka119 = 500;
  PP_PP_kd73 = 100000;
  PP_PP_ke73 = 107000000;
  PP_PP_kc73 = 1000;
  PP_PP_ka73 = 300.02;
  PP_PP_ka46 = 100000000;
  PP_PP_kb46 = 30000;
  PP_PP_kc46 = 100000;
  PP_PP_kc239 = 1000;
  PP_PP_kd46 = 2;
  PP_PP_ke44 = 50000;
  PP_PP_kf44 = 100;
  PP_PP_kg44 = 500;
  PP_PP_kf73 = 2;
  PP_PP_ka251 = 1590000;
  PP_PP_kb251 = 1000;
  PP_PP_kc251 = 100;
  PP_PP_kc72 = 10657;
  PP_PP_kb72 = 500;
  PP_PP_ka17 = 100000;
  PP_PP_kc53 = 100000;
  PP_PP_kd53 = 100000;
  PP_PP_kb45 = 200000;
  PP_PP_kd45 = 1000;
  PP_PP_kd72 = 5000;
  PP_PP_kb160 = 500000;
  PP_PP_ka135 = 83.5;
  PP_PP_kb135 = 76;
  PP_PP_kc135 = 2;
  PP_PP_kd135 = 1000;
  PP_kd_irak_p = 1;
  PP_IL8_R_0 = PP_IL8_R;
  PP_n_irak_p = 1;
  PP_kd_ifngr_p1 = 1;
  PP_n_ifngr_p1 = 1;
  PP_kd_il4r_p1 = 1;
  PP_n_il4r_p1 = 1;
  PP_k_il8r_p = 0.1;
  PP_k_il8r_d = 0.1;
  PP_k_il8_b = 0.1;
  PP_k_il8_ub = 0.1;
  PP_k_il8_p = 0.1;
  PP_k_il8_d = 0.1;
  PP_IL8_0 = PP_IL8;
  PP_kd_il8_p1 = 1;
  PP_n_il8_p1 = 1;
  PP_IL8R_0 = PP_IL8R;
  PP_IFNGR_0 = IFNGR;
  PP_IL4R_0 = IL4R;
  kd_il8_p1 = 1;
  n_il8_p1 = 1;
  kd_ikb_d = 88.948;
  n_ikb_d = 23.43;
  kd_ikb_p = 1.207;
  n_ikb_p = 29.52;
  k_il8_d = 0.1;

  // Assignment rules:
  M1_Mg := Mg_f + M1_Mg_ATP + M1_Mg_IM;
  M1_Mg_n := M1_Mg/M1_Mg_0;
  M1_Mg_f_n := Mg_f/Mg_f_0;
  M1_Mg_IM_n := M1_Mg_IM/M1_Mg_IM_0;
  M1_Mg_ATP_n := M1_Mg_ATP/M1_Mg_ATP_0;
  PP_PP_IRF9T := PP_PP_IRF9 + PP_PP_IRF9_n + PP_PP_pSTAT1D_IRF9 + PP_PP_pSTAT1D_IRF9_n;
  PP_PP_pAKT_t := PP_PP_pAKT1 + PP_PP_pAKT2;
  M1_F_trpm_i := 1;
  M1_F_mg_i := M1_Mg_0/M1_Mg;
  PP_F_il8_irak := ((PP_IL8_R + PP_kd_irak_p)/(PP_IL8_R_0 + PP_kd_irak_p))^PP_n_irak_p;
  PP_F_il8_ifngr := ((PP_IL8_R + PP_kd_ifngr_p1)/(PP_IL8_R_0 + PP_kd_ifngr_p1))^PP_n_ifngr_p1;
  PP_F_il8_il4p := ((PP_IL8_R_0 + PP_kd_il4r_p1)/(PP_IL8_R + PP_kd_il4r_p1))^PP_n_il4r_p1;
  PP_nIL8 := PP_IL8/PP_IL8_0;
  PP_nIL8R := PP_IL8R/PP_IL8R_0;
  PP_nIFNGR := IFNGR/PP_IFNGR_0;
  PP_nIL4R := IL4R/PP_IL4R_0;
  F_mg_ikb_d := ((Mg_f_0 + kd_ikb_d)/(Mg_f + kd_ikb_d))^n_ikb_d;
  F_h3s10_ikb := ((M1_pH3S10 + kd_ikb_p)/(M1_pH3S10_0 + kd_ikb_p))^n_ikb_p;

  // Reactions:
  M1_Mg_transport: $Mg_e + M1_TRPM => Mg_f + M1_TRPM; M1_k_m_i*Mg_e*(Mg_e > 0)*M1_F_mg_i*M1_F_trpm_i - M1_k_m_e*Mg_f*(Mg_f > 0);
  M1_Mg_ATP_binding: Mg_f + M1_ATP => M1_Mg_ATP; M1_k_matp_b*Mg_f^M1_n_matp_b*(Mg_f > 0)*M1_ATP*(M1_ATP > 0) - M1_k_matp_ub*M1_Mg_ATP*(M1_Mg_ATP > 0); M1_Mg_ATP_binding is "Mg/ATP binding";
  M1_consumption: M1_ATP => $M1_cons; M1_k_atp_c*M1_ATP;
  M1_To_cytoplasm: M1_nTRPM => M1_TRPM; M1_k_ntrpm_t*M1_nTRPM^M1_n_ntrpm_t;
  M1_prod_ATP: $M1_ATP_prod + Mg_f => M1_ATP + Mg_f; M1_k_atp_p0 + M1_k_atp_pm*Mg_f;
  M1_prod_TRPM: $M1_TRPM_prod + M1_Mg_ATP => M1_nTRPM + M1_Mg_ATP; M1_k_ntrpm_p*M1_TRPM_prod*(M1_Mg_ATP/M1_Mg_ATP_0)^M1_n_ntrpm_p;
  M1_Membrane_binding: Mg_f + $M1_IM -> M1_Mg_IM; M1_k_mim_b*Mg_f^M1_n_mim_b*(Mg_f > 0)*M1_IM*(M1_IM > 0) - M1_k_mim_ub*M1_Mg_IM*(M1_Mg_IM > 0);
  M1_TRPM_seg: M1_TRPM => M1_M7CK; M1_k_trpm_s*M1_TRPM;
  M1_M7CK_trans: M1_M7CK -> M1_nM7CK; M1_k_m7ck_t1*M1_M7CK^M1_n_m7ck_t*(M1_M7CK > 0) - M1_k_m7ck_t2*M1_nM7CK*(M1_nM7CK > 0);
  M1_M7CK_deg: M1_M7CK => $M1_deg; M1_k_m7ck_deg*M1_M7CK;
  M1_H3S10_phos: $M1_H3S10 + M1_nM7CK -> M1_pH3S10 + M1_nM7CK; M1_k_h3s10_p*M1_H3S10*M1_nM7CK^M1_n_h3s10_p*(M1_H3S10 > 0) - M1_k_h3s10_up*M1_pH3S10*(M1_pH3S10 > 0);
  PP_PP_v1: PP_PP_IFNG + PP_PP_IFNGR_JAK -> PP_PP_IFNG_R_JAK; PP_PP_kf1*PP_PP_IFNG*PP_PP_IFNGR_JAK - PP_PP_kr1*PP_PP_IFNG_R_JAK;
  PP_PP_v2: PP_PP_IFNG_R_JAK -> PP_PP_pIFNG_R_JAK; PP_PP_kf2*PP_PP_IFNG_R_JAK - PP_PP_kr2*PP_PP_pIFNG_R_JAK;
  PP_PP_v3: PP_PP_STAT1 + PP_PP_pIFNG_R_JAK -> PP_PP_pIFNG_R_JAK_STAT1; PP_PP_kf3*PP_PP_STAT1*PP_PP_pIFNG_R_JAK - PP_PP_kr3*PP_PP_pIFNG_R_JAK_STAT1;
  PP_PP_v4: PP_PP_pIFNG_R_JAK_STAT1 => PP_PP_pSTAT1 + PP_PP_pIFNG_R_JAK; PP_PP_k4*PP_PP_pIFNG_R_JAK_STAT1;
  PP_PP_v5: 2 PP_PP_pSTAT1 -> PP_PP_pSTAT1D; PP_PP_kf5*PP_PP_pSTAT1^2 - PP_PP_kr5*PP_PP_pSTAT1D;
  PP_PP_v6: PP_PP_pSTAT1D => PP_PP_pSTAT1D_n; PP_PP_k6*PP_PP_pSTAT1D;
  PP_PP_v10: PP_PP_pSTAT1D_n => PP_PP_STAT1D_n; PP_PP_k7*PP_PP_pSTAT1D_n;
  PP_PP_v8: PP_PP_STAT1D_n => 2 PP_PP_STAT1_n; PP_PP_kr5*PP_PP_STAT1D_n;
  PP_PP_v9: PP_PP_STAT1_n => PP_PP_STAT1; PP_PP_k9*PP_PP_STAT1_n;
  PP_PP_v7: PP_PP_pSTAT1 => PP_PP_STAT1; PP_PP_k7*PP_PP_pSTAT1;
  PP_PP_v11: PP_PP_SOCS1 + PP_PP_IFNG_R_JAK -> PP_PP_IFNG_R_JAK_SOCS1; PP_PP_kf11*PP_PP_SOCS1*PP_PP_IFNG_R_JAK - PP_PP_kr11*PP_PP_IFNG_R_JAK_SOCS1;
  PP_PP_v12: PP_PP_pIFNG_R_JAK => PP_PP_IFNG_R_lyso + PP_PP_JAK; PP_PP_k12*PP_PP_pIFNG_R_JAK;
  PP_PP_v13: PP_PP_IFNG_R_JAK_SOCS1 => PP_PP_SOCS1_JAK + PP_PP_IFNG_R; PP_PP_k13*PP_PP_IFNG_R_JAK_SOCS1;
  PP_PP_v14: PP_PP_pSTAT1D + PP_PP_IRF9 -> PP_PP_pSTAT1D_IRF9; PP_PP_kf14*PP_PP_pSTAT1D*PP_PP_IRF9 - PP_PP_kr14*PP_PP_pSTAT1D_IRF9;
  PP_PP_v15: PP_PP_pSTAT1D_IRF9 => PP_PP_pSTAT1D_IRF9_n; PP_PP_k15*PP_PP_pSTAT1D_IRF9;
  PP_PP_v16: PP_PP_pSTAT1D_n + PP_PP_IRF9_n -> PP_PP_pSTAT1D_IRF9_n; PP_PP_kf14*PP_PP_pSTAT1D_n*PP_PP_IRF9_n - PP_PP_kr14*PP_PP_pSTAT1D_IRF9_n;
  PP_PP_v17: PP_PP_pSTAT1D_IRF9_n + $PP_PP_CXCL10_prod + PP_NFKB_n => PP_PP_pSTAT1D_IRF9_n + PP_PP_mCXCL10 + PP_NFKB_n; PP_PP_k17*PP_PP_pSTAT1D_IRF9_n^2*(0.004 + PP_NFKB_n/(PP_NFKB_n + PP_PP_ka17))*PP_PP_CXCL10_prod;
  PP_PP_v18: PP_PP_SOCS3 + PP_PP_IFNG_R_JAK -> PP_PP_IFNG_R_JAK_SOCS3; PP_PP_kf18*PP_PP_SOCS3*PP_PP_IFNG_R_JAK - PP_PP_kr11*PP_PP_IFNG_R_JAK_SOCS3;
  PP_PP_v19: PP_PP_IFNG_R_JAK_SOCS3 => PP_PP_SOCS3_JAK + PP_PP_IFNG_R; PP_PP_k13*PP_PP_IFNG_R_JAK_SOCS3;
  PP_PP_v20: $PP_PP_SOCS3_prod + PP_PP_pSTAT3D_n + PP_PP_AP1_n => PP_PP_SOCS3 + PP_PP_pSTAT3D_n + PP_PP_AP1_n; PP_PP_k20*(PP_PP_pSTAT3D_n/(PP_PP_pSTAT3D_n + PP_PP_ka20) + PP_PP_AP1_n/(PP_PP_AP1_n + PP_PP_kb20))*PP_PP_SOCS3_prod;
  PP_PP_v21: PP_PP_IFNG_R_lyso => PP_PP_deg; PP_PP_k21*PP_PP_IFNG_R_lyso;
  PP_PP_v22: PP_PP_IL4 + PP_PP_IL4R_JAK -> PP_PP_IL4_R_JAK; PP_PP_kf22*PP_PP_IL4*PP_PP_IL4R_JAK - PP_PP_kr22*PP_PP_IL4_R_JAK;
  PP_PP_v23: PP_PP_pIL4_R_JAK => PP_PP_pIL4_R_JAK_i; PP_PP_k23*PP_PP_pIL4_R_JAK;
  PP_PP_v24: PP_PP_STAT6 + PP_PP_pIL4_R_JAK_i -> PP_PP_pIL4_R_JAK_STAT6; PP_PP_kf24*PP_PP_STAT6*PP_PP_pIL4_R_JAK_i - PP_PP_kr24*PP_PP_pIL4_R_JAK_STAT6;
  PP_PP_v25: PP_PP_pIL4_R_JAK_STAT6 => PP_PP_pSTAT6 + PP_PP_pIL4_R_JAK_i; PP_PP_k25*PP_PP_pIL4_R_JAK_STAT6;
  PP_PP_v26: PP_PP_pSTAT6 => PP_PP_STAT6; PP_PP_k26*PP_PP_pSTAT6;
  PP_PP_v27: 2 PP_PP_pSTAT6 -> PP_PP_pSTAT6D; PP_PP_kf27*PP_PP_pSTAT6^2 - PP_PP_kr5*PP_PP_pSTAT6D;
  PP_PP_v28: PP_PP_pSTAT6D => PP_PP_pSTAT6D_n; PP_PP_k28*PP_PP_pSTAT6D;
  PP_PP_v29: PP_PP_pSTAT6D_n => PP_PP_STAT6D_n; PP_PP_k26*PP_PP_pSTAT6D_n;
  PP_PP_v30: PP_PP_STAT6D_n => 2 PP_PP_STAT6_n; PP_PP_kr5*PP_PP_STAT6D_n;
  PP_PP_v31: PP_PP_STAT6_n => PP_PP_STAT6; PP_PP_k31*PP_PP_STAT6_n;
  PP_PP_v32: PP_PP_SOCS1 + PP_PP_pIL4_R_JAK_i -> PP_PP_IL4_R_JAK_SOCS1_i; PP_PP_kf11*PP_PP_SOCS1*PP_PP_pIL4_R_JAK_i - PP_PP_kr11*PP_PP_IL4_R_JAK_SOCS1_i;
  PP_PP_v33: IL4R => PP_PP_deg; PP_PP_k33*IL4R;
  PP_PP_v34: PP_PP_IL4_R_lyso => PP_PP_deg; PP_PP_k34*PP_PP_IL4_R_lyso;
  PP_PP_v35: PP_PP_SOCS3 + PP_PP_pIL4_R_JAK_i -> PP_PP_IL4_R_JAK_SOCS3_i; PP_PP_kf35*PP_PP_SOCS3*PP_PP_pIL4_R_JAK_i - PP_PP_kr11*PP_PP_IL4_R_JAK_SOCS3_i;
  PP_PP_v36: PP_PP_IL4_R_JAK_SOCS3_i => PP_PP_SOCS3_JAK + PP_PP_IL4_R; PP_PP_k13*PP_PP_IL4_R_JAK_SOCS3_i;
  PP_PP_v37: PP_PP_SOCS3_JAK => PP_PP_deg + PP_PP_SOCS3; PP_PP_k37*PP_PP_SOCS3_JAK;
  PP_PP_v38: $PP_PP_IRF4_prod + PP_PP_pSTAT6D_n + $PP_PP_pAKT_t => PP_PP_IRF4 + PP_PP_pSTAT6D_n + $PP_PP_pAKT_t; PP_PP_k38*PP_PP_pSTAT6D_n/(PP_PP_pSTAT6D_n + PP_PP_ka38)*PP_PP_pAKT_t/(PP_PP_pAKT_t + PP_PP_kb38)*PP_PP_IRF4_prod;
  PP_PP_v39: IFNGR + PP_PP_JAK -> PP_PP_IFNGR_JAK; PP_PP_kf39*IFNGR*PP_PP_JAK - PP_PP_kr39*PP_PP_IFNGR_JAK;
  PP_PP_v40: IL4R + PP_PP_JAK -> PP_PP_IL4R_JAK; PP_PP_kf39*IL4R*PP_PP_JAK - PP_PP_kr40*PP_PP_IL4R_JAK;
  PP_PP_v41: PP_PP_IL4_R_JAK_SOCS1_i => PP_PP_IL4_R + PP_PP_SOCS1_JAK; PP_PP_k13*PP_PP_IL4_R_JAK_SOCS1_i;
  PP_PP_v42: PP_PP_JAK + PP_PP_IFNG_R -> PP_PP_IFNG_R_JAK; PP_PP_kf39*PP_PP_JAK*PP_PP_IFNG_R - PP_PP_kr39*PP_PP_IFNG_R_JAK;
  PP_PP_v43: PP_PP_IL4_R + PP_PP_JAK -> PP_PP_pIL4_R_JAK_i; PP_PP_kf39*PP_PP_IL4_R*PP_PP_JAK - PP_PP_kr40*PP_PP_pIL4_R_JAK_i;
  PP_PP_v44: $PP_PP_IL10_prod + $PP_PP_IRF9T + PP_PP_pSTAT3D_n + PP_PP_p50 + PP_PP_AP1_n + PP_PP_pCREB + PP_PP_CEBPB + PP_PP_pSTAT6D_n + PP_PP_HIF1a_b_n + $PP_PP_pAKT_t + PP_PP_pSTAT1D_n => $PP_PP_IRF9T + PP_PP_pSTAT3D_n + PP_PP_mIL10 + PP_PP_p50 + PP_PP_AP1_n + PP_PP_pCREB + PP_PP_CEBPB + PP_PP_pSTAT6D_n + PP_PP_HIF1a_b_n + $PP_PP_pAKT_t + PP_PP_pSTAT1D_n; PP_PP_k44*((PP_PP_AP1_n + PP_PP_pCREB*0.2 + PP_PP_CEBPB*0.01)/(PP_PP_AP1_n + PP_PP_pCREB*0.2 + PP_PP_CEBPB*0.01 + PP_PP_ka44))*PP_PP_pSTAT3D_n/(PP_PP_pSTAT3D_n + PP_PP_kb44)*(PP_PP_IRF9T + 15000)*(0.5 + PP_PP_pSTAT6D_n/(PP_PP_pSTAT6D_n + PP_PP_kc44))*(PP_PP_HIF1a_b_n^2 + PP_PP_kd44)*(PP_PP_pAKT_t/(PP_PP_pAKT_t + PP_PP_ke44))*PP_PP_IL10_prod*(1 - PP_PP_pSTAT1D_n/(PP_PP_pSTAT1D_n + PP_PP_kf44))*(0.01 + PP_PP_p50/(PP_PP_p50 + PP_PP_kg44));
  PP_PP_v45: PP_PP_pSTAT3D_n + PP_PP_pSTAT6D_n + $PP_PP_ARG1_prod + PP_PP_HIF1a_b_n + PP_PP_HIF2a_b_n + PP_PP_IRF4 + PP_PP_TNFa_R + PP_PP_CEBPB => PP_PP_ARG1 + PP_PP_HIF2a_b_n + PP_PP_pSTAT6D_n + PP_PP_HIF1a_b_n + PP_PP_IRF4 + PP_PP_TNFa_R + PP_PP_CEBPB + PP_PP_pSTAT3D_n; PP_PP_k45*PP_PP_pSTAT6D_n*PP_PP_CEBPB*0.001/(PP_PP_pSTAT6D_n*PP_PP_CEBPB*0.001 + PP_PP_ka45)*(PP_PP_HIF1a_b_n + PP_PP_HIF2a_b_n)^2*(PP_PP_IRF4/(PP_PP_IRF4 + PP_PP_kb45))*(1.1 - PP_PP_TNFa_R/(PP_PP_TNFa_R + PP_PP_kc45))*PP_PP_ARG1_prod*(0.02 + PP_PP_pSTAT3D_n/(PP_PP_pSTAT3D_n + PP_PP_kd45));
  PP_PP_v46: $PP_PP_IL12_prod + PP_PP_IRF1 + PP_PP_aIRF5 + PP_NFKB_n + PP_PP_CEBPB + PP_PP_AP1_n + PP_PP_pSTAT3D_n => PP_PP_IRF1 + PP_PP_IL12 + PP_PP_aIRF5 + PP_NFKB_n + PP_PP_CEBPB + PP_PP_AP1_n + PP_PP_pSTAT3D_n; PP_PP_k46*(PP_PP_IRF1^2/(PP_PP_IRF1^2 + PP_PP_ka46) + 0.01)*PP_PP_IL12_prod*(0.2 + PP_PP_aIRF5/(PP_PP_aIRF5 + PP_PP_kb46))*(0.1 + PP_NFKB_n*PP_PP_CEBPB*PP_PP_AP1_n*1e-7/(PP_NFKB_n*PP_PP_CEBPB*PP_PP_AP1_n*1e-7 + PP_PP_kc46))*(1 - PP_PP_pSTAT3D_n/(PP_PP_pSTAT3D_n + PP_PP_kd46));
  PP_PP_v47: PP_PP_pSTAT1D_n + $PP_PP_CXCL9_prod => PP_PP_pSTAT1D_n + PP_PP_CXCL9; PP_PP_k47*PP_PP_pSTAT1D_n^2*PP_PP_CXCL9_prod;
  PP_PP_v48: $PP_PP_miR3473_prod + PP_PP_IRF1 => PP_PP_m3473b + PP_PP_IRF1; PP_PP_k48*(1 - PP_PP_IRF1^2/(PP_PP_IRF1^2 + PP_PP_ka48))*PP_PP_miR3473_prod;
  PP_PP_v49: PP_PP_mPTEN => PP_PP_PTEN + PP_PP_mPTEN; PP_PP_k49*PP_PP_mPTEN;
  PP_PP_v50: PP_PP_mPTEN + PP_PP_m3473b -> PP_PP_m3473b_mPTEN; PP_PP_kf50*PP_PP_mPTEN*PP_PP_m3473b - PP_PP_kr50*PP_PP_m3473b_mPTEN;
  PP_PP_v51: PP_PP_m3473b_mPTEN => PP_PP_m3473b + PP_PP_deg; PP_PP_k51*PP_PP_m3473b_mPTEN;
  PP_PP_v52: $PP_PP_IRF1_prod + PP_PP_pSTAT1D_n + PP_PP_pSTAT6D_n + PP_PP_pSTAT1D_IRF9_n => PP_PP_IRF1 + PP_PP_pSTAT1D_n + PP_PP_pSTAT6D_n + PP_PP_pSTAT1D_IRF9_n; PP_PP_k52*((PP_PP_pSTAT1D_n + PP_PP_pSTAT1D_IRF9_n + 1)/(PP_PP_pSTAT6D_n + 1))/((PP_PP_pSTAT1D_n + PP_PP_pSTAT1D_IRF9_n + 1)/(PP_PP_pSTAT6D_n + 1) + PP_PP_ka52)*PP_PP_IRF1_prod;
  PP_PP_v53: $PP_PP_iNOS_prod + PP_PP_HIF1a_b_n + PP_PP_IRF1 + $PP_PP_IRF9T + PP_PP_CEBPB + PP_NFKB_n => PP_PP_HIF1a_b_n + PP_PP_IRF1 + PP_PP_iNOS + $PP_PP_IRF9T + PP_PP_CEBPB + PP_NFKB_n; PP_PP_iNOS_prod*PP_PP_k53*(0.01 + PP_PP_HIF1a_b_n/(PP_PP_HIF1a_b_n + PP_PP_ka53))*(PP_PP_IRF1/(PP_PP_IRF1 + PP_PP_kb53))*(PP_PP_IRF9T + 15000)*(0.02 + PP_NFKB_n/(PP_NFKB_n + PP_PP_kc53))*(0.1 + PP_PP_CEBPB/(PP_PP_CEBPB + PP_PP_kd53));
  PP_PP_v54: $PP_PP_HIF1a_prod + PP_PP_m93 + PP_NFKB_n => PP_PP_HIF1a + PP_PP_m93 + PP_NFKB_n; PP_PP_k54*(0.1 + PP_NFKB_n/(PP_NFKB_n + PP_PP_ka54))*(1.4 - PP_PP_m93/(PP_PP_m93 + PP_PP_kb54))*PP_PP_HIF1a_prod;
  PP_PP_v55: $PP_PP_HIF2a_prod + PP_PP_aPPARG => PP_PP_HIF2a + PP_PP_aPPARG; PP_PP_HIF2a_prod*PP_PP_k55*PP_PP_aPPARG;
  PP_PP_v56: $PP_PP_PPARG_prod + PP_PP_pSTAT6D_n => PP_PP_PPARG + PP_PP_pSTAT6D_n; PP_PP_k56*(0.07 + PP_PP_pSTAT6D_n/(PP_PP_pSTAT6D_n + PP_PP_ka56))*PP_PP_PPARG_prod;
  PP_PP_v57: PP_PP_PPARG + $PP_PP_pAKT_t => PP_PP_aPPARG + $PP_PP_pAKT_t; PP_PP_k57*PP_PP_PPARG*PP_PP_pAKT_t;
  PP_PP_v58: PP_PP_HIF2a -> PP_PP_HIF2a_n; PP_PP_kf58*PP_PP_HIF2a - PP_PP_kr58*PP_PP_HIF2a_n;
  PP_PP_v59: PP_PP_HIF1a -> PP_PP_HIF1a_n; PP_PP_kf58*PP_PP_HIF1a - PP_PP_kr58*PP_PP_HIF1a_n;
  PP_PP_v60: PP_PP_HIF2a_n + PP_PP_HIF1b_n -> PP_PP_HIF2a_b_n; PP_PP_kf60*PP_PP_HIF2a_n*PP_PP_HIF1b_n - PP_PP_kr60*PP_PP_HIF2a_b_n;
  PP_PP_v61: PP_PP_HIF1a_n + PP_PP_HIF1b_n -> PP_PP_HIF1a_b_n; PP_PP_kf60*PP_PP_HIF1a_n*PP_PP_HIF1b_n - PP_PP_kr60*PP_PP_HIF1a_b_n;
  PP_PP_v62: $PP_PP_O2 + PP_PP_aPHD -> PP_PP_O2_aPHD; PP_PP_kf62*PP_PP_O2*PP_PP_aPHD - PP_PP_kr62*PP_PP_O2_aPHD;
  PP_PP_v63: PP_PP_O2_aPHD + PP_PP_HIF1a => PP_PP_HIF1a_OH + PP_PP_aPHD; PP_PP_k63*PP_PP_O2_aPHD*PP_PP_HIF1a;
  PP_PP_v64: PP_PP_HIF2a + PP_PP_O2_aPHD => PP_PP_HIF2a_OH + PP_PP_aPHD; PP_PP_k64*PP_PP_HIF2a*PP_PP_O2_aPHD;
  PP_PP_v65: PP_PP_HIF1a_OH => PP_PP_deg; PP_PP_k65*PP_PP_HIF1a_OH;
  PP_PP_v66: PP_PP_SOCS1_JAK => PP_PP_SOCS1 + PP_PP_deg; PP_PP_k66*PP_PP_SOCS1_JAK;
  PP_PP_v67: PP_PP_mIRF9 => PP_PP_IRF9 + PP_PP_mIRF9; PP_PP_k67*PP_PP_mIRF9;
  PP_PP_v68: PP_PP_m93 + PP_PP_mIRF9 -> PP_PP_m93_mIRF9; PP_PP_kf50*PP_PP_m93*PP_PP_mIRF9 - PP_PP_kr50*PP_PP_m93_mIRF9;
  PP_PP_v69: PP_PP_m93_mIRF9 => PP_PP_m93 + PP_PP_deg; PP_PP_k51*PP_PP_m93_mIRF9;
  PP_PP_v70: $PP_PP_IRF9_prod => PP_PP_mIRF9; PP_PP_k70*PP_PP_IRF9_prod;
  PP_PP_v71: $PP_PP_PTEN_prod => PP_PP_mPTEN; PP_PP_k71*PP_PP_PTEN_prod;
  PP_PP_v72: $PP_PP_VEGF_prod + PP_PP_m93 + PP_PP_HIF1a_b_n + PP_PP_HIF2a_b_n + PP_PP_AP1_n + PP_PP_pCREB => PP_PP_V165a + PP_PP_m93 + PP_PP_HIF1a_b_n + PP_PP_HIF2a_b_n + PP_PP_AP1_n + PP_PP_pCREB; PP_PP_VEGF_prod*PP_PP_k72*(0.1 + PP_PP_HIF1a_b_n*PP_PP_HIF2a_b_n/(PP_PP_HIF1a_b_n*PP_PP_HIF2a_b_n + PP_PP_ka72))*(1.1 - PP_PP_m93/(PP_PP_m93 + PP_PP_kb72))*(0.01 + PP_PP_AP1_n/(PP_PP_AP1_n + PP_PP_kc72))*(PP_PP_pCREB/(PP_PP_pCREB + PP_PP_kd72));
  PP_PP_v73: $PP_PP_IFNG_prod + PP_PP_HIF1a_b_n + PP_PP_pSTAT6D_n + PP_PP_HIF2a_b_n + PP_PP_IL12 + PP_NFKB_n + PP_PP_pCREB + PP_PP_AP1_n + PP_PP_pSTAT3D_n => PP_PP_IFNG + PP_PP_HIF1a_b_n + PP_PP_pSTAT6D_n + PP_PP_HIF2a_b_n + PP_PP_IL12 + PP_NFKB_n + PP_PP_pCREB + PP_PP_AP1_n + PP_PP_pSTAT3D_n; PP_PP_k73*(0.01 + (PP_PP_HIF1a_b_n + PP_PP_HIF2a_b_n)/(PP_PP_HIF1a_b_n + PP_PP_HIF2a_b_n + PP_PP_ka73))*(1 - PP_PP_pSTAT6D_n/(PP_PP_pSTAT6D_n + PP_PP_kb73))*PP_PP_IFNG_prod*(0.1 + PP_PP_IL12/(PP_PP_IL12 + PP_PP_kc73))*(0.1 + PP_NFKB_n/(PP_NFKB_n + PP_PP_kd73))*(0.1 + PP_PP_pCREB*PP_PP_AP1_n/(PP_PP_pCREB*PP_PP_AP1_n + PP_PP_ke73))*(1 - PP_PP_pSTAT3D_n/(PP_PP_pSTAT3D_n + PP_PP_kf73));
  PP_PP_v74: $PP_PP_PHD_prod + PP_PP_HIF1a_b_n + PP_PP_HIF2a_b_n => PP_PP_HIF2a_b_n + PP_PP_HIF1a_b_n + PP_PP_PHD; PP_PP_k74*(PP_PP_HIF1a_b_n^2/(PP_PP_HIF1a_b_n^2 + PP_PP_ka74)*PP_PP_HIF2a_b_n^2/(PP_PP_HIF2a_b_n^2 + PP_PP_kb74))*PP_PP_PHD_prod;
  PP_PP_v75: PP_PP_PHD => PP_PP_deg; PP_PP_k75*PP_PP_PHD;
  PP_PP_v76: PP_PP_HIF1a_OH => PP_PP_HIF1a; PP_PP_k76*PP_PP_HIF1a_OH;
  PP_PP_v77: PP_PP_HIF2a_OH => PP_PP_HIF2a; PP_PP_k76*PP_PP_HIF2a_OH;
  PP_PP_v78: PP_PP_HIF2a_OH => PP_PP_deg; PP_PP_k65*PP_PP_HIF2a_OH;
  PP_PP_v79: $PP_PP_miR93_prod + PP_PP_TNFa_R + PP_PP_pIFNG_R_JAK + PP_PP_IL1b_R => PP_PP_m93 + PP_PP_TNFa_R + PP_PP_pIFNG_R_JAK + PP_PP_IL1b_R; PP_PP_k79*(1 - PP_PP_TNFa_R*PP_PP_IL1b_R*PP_PP_pIFNG_R_JAK^1/(PP_PP_TNFa_R*PP_PP_IL1b_R*PP_PP_pIFNG_R_JAK^1 + PP_PP_ka79))*PP_PP_miR93_prod;
  PP_PP_v80: $PP_PP_IFNGR_prod + PP_IL8_R => IFNGR + PP_IL8_R; PP_PP_k80*PP_PP_IFNGR_prod*PP_F_il8_ifngr;
  PP_PP_v81: IFNGR => PP_PP_deg; PP_PP_k81*IFNGR;
  PP_PP_v82: PP_PP_IFNG_R_lyso => PP_PP_deg + IFNGR; PP_PP_k82*PP_PP_IFNG_R_lyso;
  PP_PP_v83: PP_PP_IL4_R_lyso => PP_PP_deg + IL4R; PP_PP_k82*PP_PP_IL4_R_lyso;
  PP_PP_v84: PP_PP_IRF4 => PP_PP_deg; PP_PP_k84*PP_PP_IRF4;
  PP_PP_v85: PP_PP_IRF1 => PP_PP_deg; PP_PP_k85*PP_PP_IRF1;
  PP_PP_v86: $PP_PP_jak_prod => PP_PP_JAK; PP_PP_k86*PP_PP_jak_prod;
  PP_PP_v87: PP_PP_JAK => PP_PP_deg; PP_PP_k87*PP_PP_JAK;
  PP_PP_v88: PP_PP_mIRF9 => PP_PP_deg; PP_PP_k88*PP_PP_mIRF9;
  PP_PP_v89: PP_PP_IRF9 => PP_PP_deg; PP_PP_k89*PP_PP_IRF9;
  PP_PP_v90: PP_PP_m93 => PP_PP_deg; PP_PP_k90*PP_PP_m93;
  PP_PP_v91: PP_PP_mPTEN => PP_PP_deg; PP_PP_k88*PP_PP_mPTEN;
  PP_PP_v92: PP_PP_m3473b => PP_PP_deg; PP_PP_k92*PP_PP_m3473b;
  PP_PP_v93: PP_PP_PTEN => PP_PP_deg; PP_PP_k93*PP_PP_PTEN;
  PP_PP_v94: PP_PP_PHD -> PP_PP_aPHD; PP_PP_kr94*PP_PP_PHD - PP_PP_kf94*PP_PP_aPHD;
  PP_PP_v95: PP_PP_mCXCL10 => PP_PP_deg; PP_PP_k95*PP_PP_mCXCL10;
  PP_PP_v96: PP_PP_CXCL9 => PP_PP_deg; PP_PP_k96*PP_PP_CXCL9;
  PP_PP_v97: PP_PP_IL12 => PP_PP_deg; PP_PP_k97*PP_PP_IL12;
  PP_PP_v98: PP_PP_ARG1 => PP_PP_deg; PP_PP_k98*PP_PP_ARG1;
  PP_PP_v99: PP_PP_iNOS => PP_PP_deg; PP_PP_k99*PP_PP_iNOS;
  PP_PP_v100: PP_PP_SOCS3 => PP_PP_deg; PP_PP_k100*PP_PP_SOCS3;
  PP_PP_v101: PP_PP_SOCS1 => PP_PP_deg; PP_PP_k101*PP_PP_SOCS1;
  PP_PP_v102: PP_PP_IL4_R_JAK -> PP_PP_pIL4_R_JAK; PP_PP_kf102*PP_PP_IL4_R_JAK - PP_PP_kr102*PP_PP_pIL4_R_JAK;
  PP_PP_v103: PP_PP_pIL4_R_JAK_i => PP_PP_JAK + PP_PP_IL4_R_lyso; PP_PP_k103*PP_PP_pIL4_R_JAK_i;
  PP_PP_v104: $PP_PP_IL4_prod => PP_PP_IL4; PP_PP_k104*PP_PP_IL4_prod;
  PP_PP_v105: PP_PP_PPARG => PP_PP_deg; PP_PP_k105*PP_PP_PPARG;
  PP_PP_v106: PP_PP_aPPARG => PP_PP_PPARG; PP_PP_k106*PP_PP_aPPARG;
  PP_PP_v107: PP_PP_IL4_R_JAK_SOCS1_i => PP_PP_IL4_R_lyso + PP_PP_SOCS1 + PP_PP_JAK; PP_PP_k103*PP_PP_IL4_R_JAK_SOCS1_i;
  PP_PP_v108: PP_PP_IL4_R => PP_PP_IL4_R_lyso; PP_PP_k103*PP_PP_IL4_R;
  PP_PP_v109: PP_PP_IL4_R_JAK_SOCS3_i => PP_PP_IL4_R_lyso + PP_PP_JAK + PP_PP_SOCS3; PP_PP_k103*PP_PP_IL4_R_JAK_SOCS3_i;
  PP_PP_v110: PP_PP_IL4_R_JAK + PP_PP_SOCS1 -> PP_PP_IL4_R_JAK_SOCS1; PP_PP_kf11*PP_PP_IL4_R_JAK*PP_PP_SOCS1 - PP_PP_kr11*PP_PP_IL4_R_JAK_SOCS1;
  PP_PP_v111: PP_PP_IL4_R_JAK_SOCS1 => PP_PP_JAK + PP_PP_IL4_R_lyso + PP_PP_SOCS1; PP_PP_k111*PP_PP_IL4_R_JAK_SOCS1;
  PP_PP_v112: PP_PP_IL4_R_JAK + PP_PP_SOCS3 -> PP_PP_IL4_R_JAK_SOCS3; PP_PP_kf35*PP_PP_IL4_R_JAK*PP_PP_SOCS3 - PP_PP_kr11*PP_PP_IL4_R_JAK_SOCS3;
  PP_PP_v113: PP_PP_IL4_R_JAK_SOCS3 => PP_PP_SOCS3 + PP_PP_IL4_R_lyso + PP_PP_JAK; PP_PP_k111*PP_PP_IL4_R_JAK_SOCS3;
  PP_PP_v114: PP_PP_aPPARG => PP_PP_deg; PP_PP_k105*PP_PP_aPPARG;
  PP_PP_v115: PP_PP_IFNG_R_JAK_SOCS3 => PP_PP_IFNG_R_lyso + PP_PP_JAK + PP_PP_SOCS3; PP_PP_k12*PP_PP_IFNG_R_JAK_SOCS3;
  PP_PP_v116: PP_PP_IFNG_R_JAK_SOCS1 => PP_PP_IFNG_R_lyso + PP_PP_JAK + PP_PP_SOCS1; PP_PP_k12*PP_PP_IFNG_R_JAK_SOCS1;
  PP_PP_v117: PP_PP_pSTAT1D_IRF9_n => PP_PP_IRF9_n + PP_PP_STAT1D_n; PP_PP_k117*PP_PP_pSTAT1D_IRF9_n;
  PP_PP_v118: $PP_PP_TNFa_prod + PP_PP_IRF1 + $PP_PP_IRF9T + PP_PP_AP1_n + PP_NFKB_n + PP_PP_CEBPB + PP_PP_aIRF5 + PP_PP_pSTAT3D_n => PP_PP_TNFa + PP_PP_IRF1 + $PP_PP_IRF9T + PP_PP_AP1_n + PP_NFKB_n + PP_PP_CEBPB + PP_PP_aIRF5 + PP_PP_pSTAT3D_n; PP_PP_k118*(0.1 + PP_PP_IRF1^2/(PP_PP_IRF1^2 + PP_PP_ka118))*(15000 + PP_PP_IRF9T)*PP_PP_TNFa_prod*(PP_NFKB_n*7*(PP_PP_aIRF5/(PP_PP_aIRF5 + 5000))^2 + PP_PP_AP1_n*0.25 + PP_PP_CEBPB*0.0016 - PP_NFKB_n*PP_PP_CEBPB*8.5e-8)/(PP_NFKB_n*7*(PP_PP_aIRF5/(PP_PP_aIRF5 + 5000))^2 + PP_PP_AP1_n*0.25 + PP_PP_CEBPB*0.0016 - PP_NFKB_n*PP_PP_CEBPB*8.5e-8 + 100000)*(1.1 - PP_PP_pSTAT3D_n/(PP_PP_pSTAT3D_n + PP_PP_kb118));
  PP_PP_v119: $PP_PP_il4r_prod + PP_PP_pSTAT3D_n + PP_IL8_R => IL4R + PP_PP_pSTAT3D_n + PP_IL8_R; PP_PP_k119*PP_PP_il4r_prod*(0.05 + PP_PP_pSTAT3D_n/(PP_PP_pSTAT3D_n + PP_PP_ka119))*PP_F_il8_il4p;
  PP_PP_v120: $PP_PP_IRG1_prod + PP_PP_IRF1 + PP_PP_IRF9_n + PP_PP_pSTAT1D_IRF9_n => PP_PP_IRG1 + PP_PP_IRF1 + PP_PP_IRF9_n + PP_PP_pSTAT1D_IRF9_n; PP_PP_k120*PP_PP_IRF1*(PP_PP_IRF9_n + PP_PP_pSTAT1D_IRF9_n)^2*PP_PP_IRG1_prod;
  PP_PP_v121: PP_PP_IRG1 => PP_PP_deg; PP_PP_k121*PP_PP_IRG1;
  PP_PP_v122: $PP_PP_Itaconate_prod + PP_PP_IRG1 => PP_PP_Itaconate + PP_PP_IRG1; PP_PP_k122*PP_PP_IRG1^2*PP_PP_Itaconate_prod;
  PP_PP_v123: PP_PP_Itaconate => PP_PP_deg; PP_PP_k123*PP_PP_Itaconate;
  PP_PP_v124: PP_PP_IRF9 -> PP_PP_IRF9_n; PP_PP_k15*PP_PP_IRF9 - PP_PP_kr124*PP_PP_IRF9_n;
  PP_PP_v125: 2 PP_PP_pSTAT3 -> PP_PP_pSTAT3D; PP_PP_kf125*PP_PP_pSTAT3^2 - PP_PP_kr125*PP_PP_pSTAT3D;
  PP_PP_v126: PP_PP_pSTAT3D => PP_PP_pSTAT3D_n; PP_PP_k126*PP_PP_pSTAT3D;
  PP_PP_v130: PP_PP_pSTAT3D_n => PP_PP_STAT3D_n; PP_PP_k127*PP_PP_pSTAT3D_n;
  PP_PP_v128: PP_PP_STAT3D_n => 2 PP_PP_STAT3_n; PP_PP_kr125*PP_PP_STAT3D_n;
  PP_PP_v129: PP_PP_STAT3_n => PP_PP_STAT3; PP_PP_k129*PP_PP_STAT3_n;
  PP_PP_v127: PP_PP_pSTAT3 => PP_PP_STAT3; PP_PP_k127*PP_PP_pSTAT3;
  PP_PP_v131: PP_PP_pSTAT1 + PP_PP_pSTAT3 -> PP_PP_pSTAT1_3; PP_PP_kf131*PP_PP_pSTAT1*PP_PP_pSTAT3 - PP_PP_kr5*PP_PP_pSTAT1_3;
  PP_PP_v132: PP_PP_pSTAT1_3 => PP_PP_pSTAT1_3_n; PP_PP_k126*PP_PP_pSTAT1_3;
  PP_PP_v133: PP_PP_pSTAT1_3_n => PP_PP_STAT3_n + PP_PP_STAT1_n; PP_PP_k133*PP_PP_pSTAT1_3_n;
  PP_PP_v134: PP_PP_pIFNG_R_JAK + PP_PP_STAT3 => PP_PP_pSTAT3 + PP_PP_pIFNG_R_JAK; PP_PP_k134*PP_PP_pIFNG_R_JAK*PP_PP_STAT3;
  PP_PP_v135: PP_PP_pSTAT1D_n + PP_PP_pSTAT6D_n + PP_PP_pSTAT3D_n + $PP_PP_SOCS1_prod + PP_PP_AP1_n => PP_PP_pSTAT1D_n + PP_PP_pSTAT6D_n + PP_PP_pSTAT3D_n + PP_PP_SOCS1 + PP_PP_AP1_n; PP_PP_k135*(0.1 + PP_PP_pSTAT1D_n/PP_PP_ka135 + PP_PP_pSTAT6D_n/PP_PP_kb135 + PP_PP_pSTAT3D_n/PP_PP_kc135 + (PP_PP_AP1_n/PP_PP_kd135)^2)*PP_PP_SOCS1_prod;
  PP_PP_v136: PP_PP_PI3K + PP_PP_pIL4_R_JAK + PP_PP_pIL10_R_JAK + PP_PP_pV165a_R1 + PP_PP_IL1b_R + PP_PP_IRAK4 + PP_PP_pIRAK4 => PP_PP_pPI3K + PP_PP_pIL4_R_JAK + PP_PP_pIL10_R_JAK + PP_PP_pV165a_R1 + PP_PP_IL1b_R + PP_PP_IRAK4 + PP_PP_pIRAK4; PP_PP_k136*PP_PP_PI3K*(PP_PP_pIL4_R_JAK + PP_PP_pIL10_R_JAK + PP_PP_pV165a_R1*0.033 + PP_PP_IL1b_R*(PP_PP_IRAK4 + PP_PP_pIRAK4)*3e-7 + 0.01);
  PP_PP_v137: PP_PP_pPI3K => PP_PP_PI3K; PP_PP_k137*PP_PP_pPI3K;
  PP_PP_v138: PP_PP_AKT1 + PP_PP_pPI3K + PP_PP_PTEN => PP_PP_pAKT1 + PP_PP_PTEN + PP_PP_pPI3K; PP_PP_k138*PP_PP_AKT1*PP_PP_pPI3K*(1 - PP_PP_PTEN/(PP_PP_PTEN + PP_PP_ka138));
  PP_PP_v139: PP_PP_AKT2 + PP_PP_pPI3K + PP_PP_PTEN => PP_PP_pAKT2 + PP_PP_pPI3K + PP_PP_PTEN; PP_PP_k138*PP_PP_AKT2*PP_PP_pPI3K*(1 - PP_PP_PTEN/(PP_PP_PTEN + PP_PP_ka138));
  PP_PP_v140: PP_PP_pAKT1 => PP_PP_AKT1; PP_PP_k140*PP_PP_pAKT1;
  PP_PP_v141: PP_PP_pAKT2 => PP_PP_AKT2; PP_PP_k140*PP_PP_pAKT2;
  PP_PP_v142: $PP_PP_IL10R_prod => PP_PP_IL10R; PP_PP_k142*PP_PP_IL10R_prod;
  PP_PP_v143: PP_PP_IL10R + PP_PP_JAK -> PP_PP_IL10R_JAK; PP_PP_kf39*PP_PP_IL10R*PP_PP_JAK - PP_PP_kr40*PP_PP_IL10R_JAK;
  PP_PP_v144: PP_PP_IL10R_JAK + PP_PP_IL10 -> PP_PP_IL10_R_JAK; PP_PP_kf144*PP_PP_IL10R_JAK*PP_PP_IL10 - PP_PP_kr144*PP_PP_IL10_R_JAK;
  PP_PP_v145: PP_PP_IL10_R_JAK -> PP_PP_pIL10_R_JAK; PP_PP_kf145*PP_PP_IL10_R_JAK - PP_PP_kr145*PP_PP_pIL10_R_JAK;
  PP_PP_v146: PP_PP_pIL10_R_JAK + PP_PP_STAT3 -> PP_PP_pIL10_R_JAK_STAT3; PP_PP_kf146*PP_PP_pIL10_R_JAK*PP_PP_STAT3 - PP_PP_kr146*PP_PP_pIL10_R_JAK_STAT3;
  PP_PP_v147: PP_PP_pIL10_R_JAK_STAT3 => PP_PP_pSTAT3 + PP_PP_pIL10_R_JAK; PP_PP_k147*PP_PP_pIL10_R_JAK_STAT3;
  PP_PP_v148: PP_PP_pIL10_R_JAK => PP_PP_JAK + PP_PP_IL10_R_lyso; PP_PP_k148*PP_PP_pIL10_R_JAK;
  PP_PP_v149: PP_PP_IL10_R_lyso => PP_PP_deg + PP_PP_IL10R; PP_PP_k82*PP_PP_IL10_R_lyso;
  PP_PP_v150: PP_PP_IL10_R_lyso => PP_PP_deg; PP_PP_k150*PP_PP_IL10_R_lyso;
  PP_PP_v151: PP_PP_IL10_R_JAK + PP_PP_SOCS1 -> PP_PP_IL10_R_JAK_SOCS1; PP_PP_kf11*PP_PP_IL10_R_JAK*PP_PP_SOCS1 - PP_PP_kr11*PP_PP_IL10_R_JAK_SOCS1;
  PP_PP_v152: PP_PP_IL10_R_JAK_SOCS1 => PP_PP_IL10_R_lyso + PP_PP_SOCS1 + PP_PP_JAK; PP_PP_k148*PP_PP_IL10_R_JAK_SOCS1;
  PP_PP_v153: PP_PP_IL10_R_JAK_SOCS1 => PP_PP_SOCS1_JAK + PP_PP_IL10_R; PP_PP_k13*PP_PP_IL10_R_JAK_SOCS1;
  PP_PP_v154: PP_PP_IL10_R + PP_PP_JAK -> PP_PP_IL10R_JAK; PP_PP_kf39*PP_PP_IL10_R*PP_PP_JAK - PP_PP_kr40*PP_PP_IL10R_JAK;
  PP_PP_v155: PP_PP_IL10R => PP_PP_deg; PP_PP_k155*PP_PP_IL10R;
  PP_PP_v156: PP_PP_mIL10 => PP_PP_IL10 + PP_PP_mIL10; PP_PP_k156*PP_PP_mIL10;
  PP_PP_v157: PP_PP_mIL10 => PP_PP_deg; PP_PP_k157*PP_PP_mIL10;
  PP_PP_v158: PP_PP_STAT1 => PP_PP_deg; PP_PP_k158*PP_PP_STAT1;
  PP_PP_v159: $PP_PP_STAT1_prod + PP_PP_m146b => PP_PP_STAT1 + PP_PP_m146b; PP_PP_k159*PP_PP_STAT1_prod*(1 - PP_PP_m146b/(PP_PP_m146b + PP_PP_ka159));
  PP_PP_v160: $PP_PP_miR146b_prod + PP_PP_pSTAT6D_n + PP_PP_pSTAT3D_n + PP_PP_CEBPB => PP_PP_pSTAT6D_n + PP_PP_pSTAT3D_n + PP_PP_pre_m146b + PP_PP_CEBPB; PP_PP_k160*PP_PP_miR146b_prod*(41.5*PP_PP_pSTAT6D_n/(PP_PP_pSTAT6D_n + PP_PP_ka160) + PP_PP_pSTAT3D_n*0.2)*(PP_PP_CEBPB/(PP_PP_CEBPB + PP_PP_kb160));
  PP_PP_v161: PP_PP_m146b => PP_PP_deg; PP_PP_k161*PP_PP_m146b;
  PP_PP_v162: PP_PP_pre_m146b => PP_PP_deg; PP_PP_k162*PP_PP_pre_m146b;
  PP_PP_v163: PP_PP_pre_m146b => PP_PP_m146b; PP_PP_k163*PP_PP_pre_m146b;
  PP_PP_v164: $PP_PP_mir155_prod + PP_PP_pSTAT3D_n + PP_NFKB_n + PP_PP_AP1_n + PP_PP_pAKT2 + PP_PP_pAKT1 => PP_PP_pre_m155 + PP_PP_pSTAT3D_n + PP_NFKB_n + PP_PP_AP1_n + PP_PP_pAKT2 + PP_PP_pAKT1; PP_PP_k164*PP_PP_mir155_prod*(1 - PP_PP_pSTAT3D_n/(PP_PP_pSTAT3D_n + PP_PP_ka164))*(PP_PP_pAKT2 + 6000)*(1.2 - PP_PP_pAKT1/(PP_PP_pAKT1 + 10000))*(PP_NFKB_n + PP_PP_kb164)*PP_PP_AP1_n^2;
  PP_PP_v165: PP_PP_pre_m155 => PP_PP_deg; PP_PP_k165*PP_PP_pre_m155;
  PP_PP_v166: PP_PP_pre_m155 => PP_PP_m155; PP_PP_k166*PP_PP_pre_m155;
  PP_PP_v167: PP_PP_m155 => PP_PP_deg; PP_PP_k167*PP_PP_m155;
  PP_PP_v168: PP_PP_CEBPB => PP_PP_deg; PP_PP_k168*PP_PP_CEBPB;
  PP_PP_v169: $PP_PP_cebpb_prod + PP_PP_m155 + PP_PP_pCREB + PP_PP_EGR2 => PP_PP_CEBPB + PP_PP_m155 + PP_PP_pCREB + PP_PP_EGR2; PP_PP_k169*PP_PP_cebpb_prod*(1.1 - PP_PP_m155/(PP_PP_m155 + PP_PP_ka169))*PP_PP_pCREB^2*(PP_PP_EGR2 + PP_PP_kb169);
  PP_PP_v170: PP_PP_TNFR + PP_PP_TNFa -> PP_PP_TNFa_R; PP_PP_kf170*PP_PP_TNFR*PP_PP_TNFa - PP_PP_kr170*PP_PP_TNFa_R;
  PP_PP_v171: PP_PP_TNFa_R => PP_PP_TNFa_R_lyso; PP_PP_k171*PP_PP_TNFa_R;
  PP_PP_v172: PP_PP_TNFa_R_lyso => PP_PP_deg; PP_PP_k172*PP_PP_TNFa_R_lyso;
  PP_PP_v173: PP_PP_TNFa_R_lyso => PP_PP_deg + PP_PP_TNFR; PP_PP_k173*PP_PP_TNFa_R_lyso;
  PP_PP_v174: PP_PP_TNFR => PP_PP_deg; PP_PP_k174*PP_PP_TNFR;
  PP_PP_v175: PP_PP_TNFa_R + PP_PP_RIP1 => PP_PP_aRIP1 + PP_PP_TNFa_R; PP_PP_k175*PP_PP_TNFa_R*PP_PP_RIP1;
  PP_PP_v176: $PP_PP_rip_prod => PP_PP_RIP1; PP_PP_k176*PP_PP_rip_prod;
  PP_PP_v177: PP_PP_RIP1 => PP_PP_deg; PP_PP_k177*PP_PP_RIP1;
  PP_PP_v178: PP_PP_aRIP1 + PP_PP_A20 => PP_PP_deg + PP_PP_A20; PP_PP_k178*PP_PP_aRIP1*PP_PP_A20/(PP_PP_A20 + PP_PP_ka178);
  PP_PP_v179: PP_PP_aRIP1 => PP_PP_RIP1; PP_PP_k179*PP_PP_aRIP1;
  PP_PP_v180: $PP_PP_tnfr_prod => PP_PP_TNFR; PP_PP_k180*PP_PP_tnfr_prod;
  PP_PP_v181: PP_PP_TAK1 + PP_PP_aRIP1 + PP_PP_aTRAF6 => PP_PP_pTAK1 + PP_PP_aRIP1 + PP_PP_aTRAF6; PP_PP_k181*PP_PP_TAK1*(PP_PP_aRIP1 + PP_PP_aTRAF6*100);
  PP_PP_v182: PP_PP_pTAK1 => PP_PP_TAK1; PP_PP_k182*PP_PP_pTAK1;
  PP_PP_v183: PP_PP_p38 + PP_PP_pTAK1 => PP_PP_pp38 + PP_PP_pTAK1; PP_PP_k183*PP_PP_p38/(PP_PP_p38 + PP_PP_ka183)*PP_PP_pTAK1;
  PP_PP_v184: PP_PP_pp38 => PP_PP_p38; PP_PP_k184*PP_PP_pp38;
  PP_PP_v185: PP_PP_pp38 => PP_PP_pp38_n; PP_PP_k185*PP_PP_pp38;
  PP_PP_v186: PP_PP_JNK + PP_PP_pTAK1 => PP_PP_pJNK + PP_PP_pTAK1; PP_PP_k186*PP_PP_JNK/(PP_PP_JNK + PP_PP_ka186)*PP_PP_pTAK1;
  PP_PP_v187: PP_PP_pJNK => PP_PP_JNK; PP_PP_k187*PP_PP_pJNK;
  PP_PP_v188: PP_PP_pp38_n => PP_PP_p38; PP_PP_k188*PP_PP_pp38_n;
  PP_PP_v189: PP_PP_IKK + PP_PP_pTAK1 => PP_PP_pIKK + PP_PP_pTAK1; PP_PP_k189*PP_PP_IKK*PP_PP_pTAK1^2;
  PP_PP_v190: PP_PP_pIKK => PP_PP_IKK; PP_PP_k190*PP_PP_pIKK;
  PP_PP_v191: $PP_PP_ikk_prod => PP_PP_IKK; PP_PP_k191*PP_PP_ikk_prod;
  PP_PP_v192: PP_PP_IKK + PP_PP_O2_aPHD => PP_PP_deg + PP_PP_O2_aPHD; PP_PP_k192*PP_PP_IKK*PP_PP_O2_aPHD^2;
  PP_PP_v193: PP_PP_pJNK_n => PP_PP_JNK; PP_PP_k193*PP_PP_pJNK_n;
  PP_PP_v194: PP_PP_pJNK => PP_PP_pJNK_n; PP_PP_k185*PP_PP_pJNK;
  PP_PP_v195: PP_PP_ERK + PP_PP_pIKK + PP_PP_aINT1 + PP_PP_aINT2 + PP_PP_pV165a_R1 => PP_PP_pERK + PP_PP_pIKK + PP_PP_aINT1 + PP_PP_aINT2 + PP_PP_pV165a_R1; PP_PP_k195*PP_PP_ERK/(PP_PP_ERK + PP_PP_ka195)*(PP_PP_pIKK + PP_PP_aINT1*5 + PP_PP_aINT2*10 + PP_PP_pV165a_R1*3);
  PP_PP_v196: PP_PP_pERK => PP_PP_pERK_n; PP_PP_k185*PP_PP_pERK;
  PP_PP_v197: PP_PP_pERK_n => PP_PP_ERK; PP_PP_k197*PP_PP_pERK_n;
  PP_PP_v198: PP_PP_pERK => PP_PP_ERK; PP_PP_k198*PP_PP_pERK;
  PP_PP_v199: PP_PP_V165a + PP_PP_VEGFR1 -> PP_PP_V165a_R1; PP_PP_kf199*PP_PP_V165a*PP_PP_VEGFR1 - PP_PP_kr199*PP_PP_V165a_R1;
  PP_PP_v200: PP_PP_V165a_R1 -> PP_PP_pV165a_R1; PP_PP_kf200*PP_PP_V165a_R1 - PP_PP_kr200*PP_PP_pV165a_R1;
  PP_PP_v201: PP_PP_pV165a_R1 => PP_PP_V165_R1_lyso; PP_PP_k201*PP_PP_pV165a_R1;
  PP_PP_v202: PP_PP_V165_R1_lyso => PP_PP_deg; PP_PP_k202*PP_PP_V165_R1_lyso;
  PP_PP_v203: PP_PP_V165_R1_lyso => PP_PP_deg + PP_PP_VEGFR1; PP_PP_k203*PP_PP_V165_R1_lyso;
  PP_PP_v204: $PP_PP_VEGF_prod => PP_PP_V165b; PP_PP_k204*PP_PP_VEGF_prod;
  PP_PP_v205: PP_PP_V165b + PP_PP_VEGFR1 -> PP_PP_V165b_R1; PP_PP_kf205*PP_PP_V165b*PP_PP_VEGFR1 - PP_PP_kr205*PP_PP_V165b_R1;
  PP_PP_v206: PP_PP_V165b_R1 => PP_PP_V165_R1_lyso; PP_PP_k206*PP_PP_V165b_R1;
  PP_PP_v207: PP_PP_STAT3 + PP_PP_pV165a_R1 -> PP_PP_pV165a_R1_STAT3; PP_PP_kf207*PP_PP_STAT3*PP_PP_pV165a_R1 - PP_PP_kr207*PP_PP_pV165a_R1_STAT3;
  PP_PP_v208: PP_PP_pV165a_R1_STAT3 => PP_PP_pSTAT3 + PP_PP_pV165a_R1; PP_PP_k208*PP_PP_pV165a_R1_STAT3;
  PP_PP_v209: $PP_PP_R1_prod => PP_PP_VEGFR1; PP_PP_k209*PP_PP_R1_prod;
  PP_PP_v210: PP_PP_VEGFR1 => PP_PP_deg; PP_PP_k210*PP_PP_VEGFR1;
  PP_PP_v211: $PP_PP_nfkb_prod => PP_PP_p65; PP_PP_k211*PP_PP_nfkb_prod;
  PP_PP_v212: $PP_PP_nfkb_prod => PP_PP_p50; PP_PP_k212*PP_PP_nfkb_prod;
  PP_PP_v213: PP_PP_p65 => PP_PP_deg; PP_PP_k213*PP_PP_p65;
  PP_PP_v214: PP_PP_p50 => PP_PP_deg; PP_PP_k214*PP_PP_p50;
  PP_PP_v215: PP_PP_p65 + PP_PP_p50 -> NFKB; PP_PP_kf215*PP_PP_p65*PP_PP_p50 - PP_PP_kr215*NFKB;
  PP_PP_v218: PP_NFKB_n + PP_PP_IKB_n -> PP_PP_IKB_NFKB_n; PP_PP_kf216*PP_NFKB_n*PP_PP_IKB_n - PP_PP_kr216*PP_PP_IKB_NFKB_n;
  PP_PP_v217: PP_PP_IKB_NFKB_n => PP_PP_IKB_NFKB; PP_PP_k217*PP_PP_IKB_NFKB_n;
  PP_PP_v216: NFKB + IKB -> PP_PP_IKB_NFKB; PP_PP_kf216*NFKB*IKB - PP_PP_kr216*PP_PP_IKB_NFKB;
  PP_PP_v219: NFKB => PP_NFKB_n; PP_PP_k219*NFKB;
  PP_PP_v220: IKB -> PP_PP_IKB_n; PP_PP_kf220*IKB - PP_PP_kr220*PP_PP_IKB_n;
  PP_v221: $PP_Ikb_prod + PP_NFKB_n => IKB + PP_NFKB_n; PP_k221*PP_Ikb_prod*PP_NFKB_n*F_h3s10_ikb;
  PP_PP_v222: PP_PP_IKB_NFKB + PP_PP_pIKK => PP_PP_pIKB + NFKB + PP_PP_pIKK; PP_PP_k222*PP_PP_IKB_NFKB*PP_PP_pIKK/(PP_PP_pIKK + PP_PP_ka222);
  PP_PP_v223: PP_PP_pIKB => PP_PP_deg; PP_PP_k223*PP_PP_pIKB;
  PP_PP_v224: PP_NFKB_n + PP_PP_SOCS1 => PP_PP_p50_n + PP_PP_SOCS1; PP_PP_k224*PP_NFKB_n*PP_PP_SOCS1/(PP_PP_SOCS1 + PP_PP_ka224);
  PP_PP_v225: PP_PP_p50_n => PP_PP_p50; PP_PP_k225*PP_PP_p50_n;
  PP_v226: IKB => deg; PP_k226*IKB*F_mg_ikb_d;
  PP_PP_v227: PP_PP_CREB + PP_PP_pp38_n + $PP_PP_pAKT_t => PP_PP_pCREB + PP_PP_pp38_n + $PP_PP_pAKT_t; PP_PP_k227*PP_PP_CREB*(PP_PP_pp38_n + PP_PP_pAKT_t*0.3);
  PP_PP_v228: PP_PP_pCREB + PP_PP_GSK3b => PP_PP_CREB + PP_PP_GSK3b; PP_PP_k228*PP_PP_pCREB*PP_PP_GSK3b;
  PP_PP_v229: PP_PP_AP1_n => PP_PP_deg; PP_PP_k229*PP_PP_AP1_n;
  PP_PP_v230: $PP_PP_ap1_prod + PP_PP_pp38_n + PP_PP_pJNK_n + PP_PP_pERK_n + PP_PP_GSK3b => PP_PP_AP1_n + PP_PP_pp38_n + PP_PP_pJNK_n + PP_PP_pERK_n + PP_PP_GSK3b; PP_PP_k230*PP_PP_ap1_prod*(PP_PP_pp38_n*0.01 + PP_PP_pJNK_n*5 + PP_PP_pERK_n*0.1)*(1.05 - PP_PP_GSK3b/(PP_PP_GSK3b + PP_PP_ka230));
  PP_PP_v231: PP_PP_pIL4_R_JAK + PP_PP_INT1 => PP_PP_aINT1 + PP_PP_pIL4_R_JAK; PP_PP_k231*PP_PP_pIL4_R_JAK*PP_PP_INT1;
  PP_PP_v232: PP_PP_aINT1 => PP_PP_INT1; PP_PP_k232*PP_PP_aINT1;
  PP_PP_v233: $PP_PP_egr2_prod + PP_PP_pSTAT6D_n => PP_PP_EGR2 + PP_PP_pSTAT6D_n; PP_PP_k233*PP_PP_egr2_prod*(PP_PP_pSTAT6D_n/(PP_PP_pSTAT6D_n + PP_PP_ka233));
  PP_PP_v234: PP_PP_EGR2 => PP_PP_deg; PP_PP_k234*PP_PP_EGR2;
  PP_PP_v235: PP_PP_aINT2 => PP_PP_INT2; PP_PP_k235*PP_PP_aINT2;
  PP_PP_v236: PP_PP_INT2 + PP_PP_pIL10_R_JAK => PP_PP_aINT2 + PP_PP_pIL10_R_JAK; PP_PP_k236*PP_PP_INT2*PP_PP_pIL10_R_JAK;
  PP_PP_v237: $PP_PP_a20_prod + PP_PP_CEBPB + PP_NFKB_n => PP_PP_A20 + PP_PP_CEBPB + PP_NFKB_n; PP_PP_k237*PP_PP_a20_prod*PP_PP_CEBPB*PP_NFKB_n;
  PP_PP_v238: PP_PP_A20 => PP_PP_deg; PP_PP_k238*PP_PP_A20;
  PP_PP_v239: $PP_PP_il1b_prod + PP_NFKB_n + PP_PP_AP1_n + PP_PP_aIRF5 + PP_PP_CEBPB + PP_PP_AP1_n + PP_PP_HIF2a_b_n + PP_PP_HIF1a_b_n + PP_PP_pSTAT3D_n + PP_PP_pSTAT6D_n => PP_PP_IL1b + PP_NFKB_n + PP_PP_aIRF5 + PP_PP_CEBPB + PP_PP_AP1_n + PP_PP_HIF1a_b_n + PP_PP_HIF2a_b_n + PP_PP_AP1_n + PP_PP_pSTAT3D_n + PP_PP_pSTAT6D_n; PP_PP_k239*PP_PP_il1b_prod*(PP_NFKB_n*PP_PP_aIRF5*0.00033 + PP_PP_AP1_n*PP_PP_CEBPB*1e-5)/(PP_NFKB_n*PP_PP_aIRF5*0.00033 + PP_PP_AP1_n*PP_PP_CEBPB*1e-5 + 30000)*(0.02 + (PP_PP_HIF1a_b_n*PP_PP_HIF2a_b_n)^2/((PP_PP_HIF1a_b_n*PP_PP_HIF2a_b_n)^2 + PP_PP_ka239))*(1.5 - PP_PP_pSTAT3D_n/(PP_PP_pSTAT3D_n + PP_PP_kb239))*(1.05 - PP_PP_pSTAT6D_n^2/(PP_PP_pSTAT6D_n^2 + PP_PP_kc239));
  PP_PP_v240: $PP_PP_il1r_prod + PP_PP_IRF1 => PP_PP_IL1R + PP_PP_IRF1; PP_PP_k240*PP_PP_il1r_prod*(1 - PP_PP_IRF1/(PP_PP_IRF1 + PP_PP_ka240));
  PP_PP_v241: PP_PP_IL1R => PP_PP_deg; PP_PP_k241*PP_PP_IL1R;
  PP_PP_v242: PP_PP_IL1R + PP_PP_IL1b -> PP_PP_IL1b_R; PP_PP_kf242*PP_PP_IL1R*PP_PP_IL1b - PP_PP_kr242*PP_PP_IL1b_R;
  PP_PP_v243: PP_PP_IL1b_R => PP_PP_IL1b_R_lyso; PP_PP_k243*PP_PP_IL1b_R;
  PP_PP_v244: PP_PP_IL1b_R_lyso => PP_PP_deg; PP_PP_k244*PP_PP_IL1b_R_lyso;
  PP_PP_v245: PP_PP_IL1b_R_lyso => PP_PP_deg + PP_PP_IL1R; PP_PP_k245*PP_PP_IL1b_R_lyso;
  PP_PP_v246: $PP_PP_irak4_prod + PP_PP_m93 => PP_PP_IRAK4 + PP_PP_m93; PP_PP_k246*PP_PP_irak4_prod*(1 - PP_PP_m93/(PP_PP_m93 + PP_PP_ka246))*PP_F_il8_irak;
  PP_PP_v247: PP_PP_IRAK4 => PP_PP_deg; PP_PP_k247*PP_PP_IRAK4;
  PP_PP_v248: PP_PP_IL1b_R + PP_PP_TRAF6 + PP_PP_A20 + PP_PP_SOCS1 + PP_PP_m146b + PP_PP_IRAK4 + PP_PP_pIRAK4 => PP_PP_IL1b_R + PP_PP_aTRAF6 + PP_PP_A20 + PP_PP_SOCS1 + PP_PP_m146b + PP_PP_IRAK4 + PP_PP_pIRAK4; PP_PP_k248*PP_PP_IL1b_R*(PP_PP_IRAK4 + PP_PP_pIRAK4)*PP_PP_TRAF6*(1.01 - PP_PP_A20/(PP_PP_A20 + PP_PP_ka248))*(1 - PP_PP_SOCS1/(PP_PP_SOCS1 + PP_PP_kb248))*(1.2 - PP_PP_m146b/(PP_PP_m146b + PP_PP_kc248));
  PP_PP_v249: PP_PP_aTRAF6 => PP_PP_TRAF6; PP_PP_k249*PP_PP_aTRAF6;
  PP_PP_v250: PP_PP_IL1Ra + PP_PP_IL1R -> PP_PP_IL1Ra_R; PP_PP_kf242*PP_PP_IL1Ra*PP_PP_IL1R - PP_PP_kr242*PP_PP_IL1Ra_R;
  PP_PP_v251: $PP_PP_il1ra_prod + PP_NFKB_n + PP_PP_CEBPB + PP_PP_pSTAT6D_n + PP_PP_pSTAT3D_n => PP_PP_IL1Ra + PP_NFKB_n + PP_PP_CEBPB + PP_PP_pSTAT6D_n + PP_PP_pSTAT3D_n; PP_PP_k251*PP_PP_il1ra_prod*(PP_NFKB_n*PP_PP_CEBPB*0.0001/(PP_NFKB_n*PP_PP_CEBPB*0.0001 + PP_PP_ka251))*(0.1 + PP_PP_pSTAT6D_n/(PP_PP_pSTAT6D_n + PP_PP_kb251))*(PP_PP_pSTAT3D_n/(PP_PP_pSTAT3D_n + PP_PP_kc251));
  PP_PP_v252: PP_PP_IL1Ra => PP_PP_deg; PP_PP_k252*PP_PP_IL1Ra;
  PP_PP_v253: PP_PP_aIRF5 => PP_PP_IRF5; PP_PP_k253*PP_PP_aIRF5;
  PP_PP_v254: PP_PP_IRF5 + PP_PP_pIKK + PP_PP_pIRAK4 + PP_PP_IRF4 => PP_PP_aIRF5 + PP_PP_pIKK + PP_PP_pIRAK4 + PP_PP_IRF4; PP_PP_k254*PP_PP_IRF5*(PP_PP_pIKK*PP_PP_pIRAK4/(PP_PP_pIRAK4*PP_PP_pIKK + PP_PP_ka254))*(1.05 - PP_PP_IRF4/(PP_PP_IRF4 + PP_PP_kb254));
  PP_PP_v255: PP_PP_IRAK4 + PP_PP_IL1b_R => PP_PP_pIRAK4 + PP_PP_IL1b_R; PP_PP_k255*PP_PP_IRAK4*PP_PP_IL1b_R^2;
  PP_PP_v256: PP_PP_pIRAK4 => PP_PP_IRAK4; PP_PP_k256*PP_PP_pIRAK4;
  PP_PP_v257: PP_PP_GSK3b + PP_PP_pAKT1 + PP_PP_pAKT2 => PP_PP_pGSK3b + PP_PP_pAKT1 + PP_PP_pAKT2; PP_PP_k257*PP_PP_GSK3b*(PP_PP_pAKT1 + PP_PP_pAKT2)^2;
  PP_PP_v258: PP_PP_pGSK3b => PP_PP_GSK3b; PP_PP_k258*PP_PP_pGSK3b;
  PP_v1: $PP_IL8R_prod -> PP_IL8R; PP_k_il8r_p;
  PP_v2: PP_IL8R -> PP_deg; PP_k_il8r_d*PP_IL8R;
  PP_v3: $PP_IL8 + PP_IL8R -> PP_IL8_R; PP_k_il8_b*PP_IL8*PP_IL8R - PP_k_il8_ub*PP_IL8_R;
  PP_v4: $PP_IL8_prod -> $PP_IL8; PP_k_il8_p;
  PP_v5: $PP_IL8 -> PP_deg; PP_k_il8_d*PP_IL8;
  _J0: $IL8_prod -> IL8; PP_k_il8_p*((M1_pH3S10 + kd_il8_p1)/(M1_pH3S10_0 + kd_il8_p1))^n_il8_p1;  // modifiers: M1_pH3S10, M1_pH3S10_0
end
