// SBML level 2 version 4

model model_Mg()
  // model_Mg

  // Compartments:
  compartment Compartment_1 = 1;

  // Species:
  species $Mg_e in Compartment_1 = 0.5;
  species Mg_f in Compartment_1 = 0.5;
  species TRPM in Compartment_1 = 1;
  species ATP in Compartment_1 = 16;
  species Mg_ATP in Compartment_1 = 9;
  species Mg in Compartment_1;
  species nTRPM in Compartment_1 = 1;
  species $cons in Compartment_1 = 0;
  species $ATP_prod in Compartment_1 = 1;
  species $TRPM_prod in Compartment_1 = 1;
  species Mg_0 in Compartment_1 = Mg_f + Mg_ATP + Mg_IM;
  species Mg_n in Compartment_1;
  species Mg_f_n in Compartment_1;
  species Mg_f_0 in Compartment_1 = Mg_f;
  species Mg_IM in Compartment_1 = 9;
  species $IM in Compartment_1 = 88.6098;
  species M7CK in Compartment_1 = 1;
  species nM7CK in Compartment_1 = 1;
  species $deg in Compartment_1 = 0;
  species $H3S10 in Compartment_1 = 1;
  species pH3S10 in Compartment_1 = 1;
  species Mg_IM_n in Compartment_1;
  species Mg_ATP_n in Compartment_1;

  // Parameters:
  k_m_i = 0.2537765;
  k_m_e = 0.254913;
  k_atp_p0 = 9.814581;
  k_matp_ub = 0.9462731;
  k_matp_b = 0.5857682;
  k_atp_c = 0.6221636;
  k_atp_pm = 2.332337;
  k_mim_b = 0.9531612;
  k_mim_ub = 0.03924968;
  var F_trpm_i;
  n_matp_b = 0.02110402;
  var F_mg_i;
  n_mim_b = 8.196932;
  k_ntrpm_p = 0.1;
  k_ntrpm_t = 0.1;
  k_trpm_s = 0.1;
  Mg_ATP_0 = Mg_ATP;
  k_m7ck_t1 = 0.1;
  k_m7ck_t2 = 0.1;
  k_m7ck_deg = 1;
  k_h3s10_p = 0.1;
  k_h3s10_up = 0.1;
  k_ntrpm_d = 0.1;
  n_ntrpm_t = 1;
  n_m7ck_t = 1;
  n_ntrpm_p = 1;
  n_h3s10_p = 1;
  Mg_IM_0 = Mg_IM;

  // Assignment rules:
  Mg := Mg_f + Mg_ATP + Mg_IM;
  Mg_n := Mg/Mg_0;
  Mg_f_n := Mg_f/Mg_f_0;
  F_trpm_i := 1;
  F_mg_i := Mg_0/Mg;
  Mg_IM_n := Mg_IM/Mg_IM_0;
  Mg_ATP_n := Mg_ATP/Mg_ATP_0;

  // Reactions:
  Mg_transport: $Mg_e + TRPM => Mg_f + TRPM; k_m_i*Mg_e*(Mg_e > 0)*F_mg_i*F_trpm_i - k_m_e*Mg_f*(Mg_f > 0);
  Mg_ATP_binding: Mg_f + ATP => Mg_ATP; k_matp_b*Mg_f^n_matp_b*(Mg_f > 0)*ATP*(ATP > 0) - k_matp_ub*Mg_ATP*(Mg_ATP > 0); Mg_ATP_binding is "Mg/ATP binding";
  consumption: ATP => $cons; k_atp_c*ATP;
  To_cytoplasm: nTRPM => TRPM; k_ntrpm_t*nTRPM^n_ntrpm_t;
  prod_ATP: $ATP_prod + Mg_f => ATP + Mg_f; k_atp_p0 + k_atp_pm*Mg_f;
  prod_TRPM: $TRPM_prod + Mg_ATP => nTRPM + Mg_ATP; k_ntrpm_p*TRPM_prod*(Mg_ATP/Mg_ATP_0)^n_ntrpm_p;
  Membrane_binding: Mg_f + $IM -> Mg_IM; k_mim_b*Mg_f^n_mim_b*(Mg_f > 0)*IM*(IM > 0) - k_mim_ub*Mg_IM*(Mg_IM > 0);
  TRPM_seg: TRPM => M7CK; k_trpm_s*TRPM;
  M7CK_trans: M7CK -> nM7CK; k_m7ck_t1*M7CK^n_m7ck_t*(M7CK > 0) - k_m7ck_t2*nM7CK*(nM7CK > 0);
  M7CK_deg: M7CK => $deg; k_m7ck_deg*M7CK;
  H3S10_phos: $H3S10 + nM7CK -> pH3S10 + nM7CK; k_h3s10_p*H3S10*nM7CK^n_h3s10_p*(H3S10 > 0) - k_h3s10_up*pH3S10*(pH3S10 > 0);
end
