// SBML level 3 version 1

model __main()

  // Compartments:
  compartment default_compartment = 1;

  // Species:
  species $Mg_e in default_compartment = 1;
  species TRPM in default_compartment = 10/default_compartment;
  species TRPM_n in default_compartment = 10/default_compartment;
  species Mg_f in default_compartment = 0.5/default_compartment;
  species Mg_ATP in default_compartment = 10/default_compartment;
  species ATP in default_compartment = 10/default_compartment;
  species $ATP_prod in default_compartment = 1;
  species $TRPM_prod in default_compartment = 1;
  species M7CKs in default_compartment = 0;

  // Parameters:
  K11 = 0.1;
  K12 = 0.1;
  n1 = 1;
  K21 = 10;
  K22 = 10;
  Kd2 = 10;
  n2 = 2;
  K4 = 0.1;
  K31 = 0.1;
  K32 = 0.1;
  K5 = 10;
  K6 = 0.1;
  K7 = 0.1;
  K8 = 0.1;

  // Assignment rules:
  Mg := Mg_f + Mg_ATP;

  // Reactions:
  V1: $Mg_e -> Mg_f; K11*Mg_e*TRPM - K12*Mg_f;  // modifiers: TRPM
  V2: $ATP_prod -> ATP; K21*Mg_f^n2/(Mg_f^n2 + Kd2) + K22;  // modifiers: Mg_f
  V4: ATP -> ; K4*ATP;
  V3: Mg_f + 5 ATP -> Mg_ATP; K31*Mg_f*ATP - K32*Mg_ATP;
  V5: $TRPM_prod + Mg_ATP => TRPM_n + Mg_ATP; K5*Mg_ATP;
  V6: TRPM_n => TRPM; K6*TRPM_n;
  V7: TRPM => M7CKs; K7*TRPM;
end
