// SBML level 3 version 1

model test()

  // Compartments:
  compartment M1_comp1 = 1;

  // Species:
  species $M1_Mg_e in M1_comp1 = 0.5;
  species M1_Mg_f in M1_comp1 = 0.5;
  species M1_TRPM in M1_comp1 = 1;
  species M1_ATP in M1_comp1 = 16;
  species M1_Mg_ATP in M1_comp1 = 9;
  species $M1_Mg in M1_comp1;
  species M1_Mg_IM in M1_comp1 = 9;
  species M1_nTRPM in M1_comp1 = 1;
  species $M1_cons in M1_comp1 = 0;
  species $M1_ATP_prod in M1_comp1 = 1;
  species $M1_TRPM_prod in M1_comp1 = 1;
  species M1_Mg_0 in M1_comp1 = M1_Mg_f + M1_Mg_ATP + M1_Mg_IM;
  species $M1_Mg_n in M1_comp1;
  species $M1_Mg_f_n in M1_comp1;
  species M1_Mg_f_0 in M1_comp1 = M1_Mg_f;
  species $M1_IM in M1_comp1 = 88.6098;
  species M1_M7CK in M1_comp1 = 1;
  species M1_nM7CK in M1_comp1 = 1;
  species $M1_deg in M1_comp1 = 0;
  species $M1_H3S10 in M1_comp1 = 1;
  species M1_pH3S10 in M1_comp1 = 1;
  species $M1_Mg_IM_n in M1_comp1;
  species $M1_Mg_ATP_n in M1_comp1;
  species M1_Mg_f_1 in M1_comp1 = 0.5;
  species M1_pH3S10_0 in M1_comp1 = M1_pH3S10;

  // Parameters:
  M1_Mg_IM_0 = M1_Mg_IM;
  M1_Mg_ATP_0 = M1_Mg_ATP;
  M1_k_m_i = 0.2537765;
  M1_k_m_e = 0.254913;
  M1_k_matp_b = 0.5857682;
  M1_n_matp_b = 0.02110402;
  M1_k_matp_ub = 0.9462731;
  M1_k_atp_c = 0.6221636;
  M1_k_ntrpm_t = 0.96;
  M1_n_ntrpm_t = 0.516;
  M1_k_atp_p0 = 9.814581;
  M1_k_atp_pm = 2.332337;
  M1_k_ntrpm_p = 0.11;
  M1_n_ntrpm_p = 12.22;
  M1_k_mim_b = 0.9531612;
  M1_n_mim_b = 8.196932;
  M1_k_mim_ub = 0.03924968;
  M1_k_trpm_s = 0.955;
  M1_k_m7ck_t1 = 0.83;
  M1_n_m7ck_t = 1.9;
  M1_k_m7ck_t2 = 0.96;
  M1_k_m7ck_deg = 0.89;
  M1_k_h3s10_p = 0.0008;
  M1_n_h3s10_p = 0.8;
  M1_k_h3s10_up = 0.0007;
  M1_k_ntrpm_d = 0.1;

  // Assignment rules:
  M1_Mg := M1_Mg_f + M1_Mg_ATP + M1_Mg_IM;
  M1_Mg_n := M1_Mg/M1_Mg_0;
  M1_Mg_f_n := M1_Mg_f/M1_Mg_f_0;
  M1_Mg_IM_n := M1_Mg_IM/M1_Mg_IM_0;
  M1_Mg_ATP_n := M1_Mg_ATP/M1_Mg_ATP_0;
  M1_F_trpm_i := 1;
  M1_F_mg_i := M1_Mg_0/M1_Mg;

  // Reactions:
  M1_Mg_transport: $M1_Mg_e + M1_TRPM => M1_Mg_f + M1_TRPM; M1_k_m_i*M1_Mg_e*(M1_Mg_e > 0)*M1_F_mg_i*M1_F_trpm_i - M1_k_m_e*M1_Mg_f*(M1_Mg_f > 0);
  M1_Mg_ATP_binding: M1_Mg_f + M1_ATP => M1_Mg_ATP; M1_k_matp_b*M1_Mg_f^M1_n_matp_b*(M1_Mg_f > 0)*M1_ATP*(M1_ATP > 0) - M1_k_matp_ub*M1_Mg_ATP*(M1_Mg_ATP > 0); M1_Mg_ATP_binding is "Mg/ATP binding";
  M1_consumption: M1_ATP => $M1_cons; M1_k_atp_c*M1_ATP;
  M1_To_cytoplasm: M1_nTRPM => M1_TRPM; M1_k_ntrpm_t*M1_nTRPM^M1_n_ntrpm_t;
  M1_prod_ATP: $M1_ATP_prod + M1_Mg_f => M1_ATP + M1_Mg_f; M1_k_atp_p0 + M1_k_atp_pm*M1_Mg_f;
  M1_prod_TRPM: $M1_TRPM_prod + M1_Mg_ATP => M1_nTRPM + M1_Mg_ATP; M1_k_ntrpm_p*M1_TRPM_prod*(M1_Mg_ATP/M1_Mg_ATP_0)^M1_n_ntrpm_p;
  M1_Membrane_binding: M1_Mg_f + $M1_IM -> M1_Mg_IM; M1_k_mim_b*M1_Mg_f^M1_n_mim_b*(M1_Mg_f > 0)*M1_IM*(M1_IM > 0) - M1_k_mim_ub*M1_Mg_IM*(M1_Mg_IM > 0);
  M1_TRPM_seg: M1_TRPM => M1_M7CK; M1_k_trpm_s*M1_TRPM;
  M1_M7CK_trans: M1_M7CK -> M1_nM7CK; M1_k_m7ck_t1*M1_M7CK^M1_n_m7ck_t*(M1_M7CK > 0) - M1_k_m7ck_t2*M1_nM7CK*(M1_nM7CK > 0);
  M1_M7CK_deg: M1_M7CK => $M1_deg; M1_k_m7ck_deg*M1_M7CK;
  M1_H3S10_phos: $M1_H3S10 + M1_nM7CK -> M1_pH3S10 + M1_nM7CK; M1_k_h3s10_p*M1_H3S10*M1_nM7CK^M1_n_h3s10_p*(M1_H3S10 > 0) - M1_k_h3s10_up*M1_pH3S10*(M1_pH3S10 > 0);
end
